// COMSOL Multiphysics 5.2.0.166 model "poly_cp.mph"
// Outline of the model tree

Parameters
  s1_1 = 1/sqrt(3)
  s1_2 = 1/sqrt(3)
  s1_3 = 1/sqrt(3)
  n1_1 = 1/sqrt(2)
  n1_2 = -1/sqrt(2)
  n1_3 = 0/sqrt(2)
  s2_1 = 1/sqrt(3)
  s2_2 = 1/sqrt(3)
  s2_3 = 1/sqrt(3)
  n2_1 = 1/sqrt(2)
  n2_2 = 0/sqrt(2)
  n2_3 = -1/sqrt(2)
  s3_1 = 1/sqrt(3)
  s3_2 = 1/sqrt(3)
  s3_3 = 1/sqrt(3)
  n3_1 = 0/sqrt(2)
  n3_2 = 1/sqrt(2)
  n3_3 = -1/sqrt(2)
  s4_1 = 1/sqrt(3)
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  n4_1 = 1/sqrt(2)
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  c11 = 228[GPa]
  c12 = 132[GPa]
  c44 = 116.5[GPa]
  v0 = 3e6[1/s]
  m = 20
  b = 2.48e-10[m]
  hn = 0.125
  g0 = 90[MPa]
  rho0 = 1e12[m^-2]
  n = 100
  k1 = 450
  k20 = 14
  vk0 = 1e10[1/s]

Functions
  int1: Interpolation | funcs = {qi1, 1}; source = file; filename = /Users/Nikhil/Documents/Academic/Numerics/ComsolExamples/polycrystalline_CP/orientation1.txt; struct = grid; interp = neighbor; extrap = const
  int2: Interpolation | funcs = {qi2, 1}; source = file; filename = /Users/Nikhil/Documents/Academic/Numerics/ComsolExamples/polycrystalline_CP/orientation2.txt; struct = grid; interp = neighbor
  int3: Interpolation | funcs = {qi3, 1}; source = file; filename = /Users/Nikhil/Documents/Academic/Numerics/ComsolExamples/polycrystalline_CP/orientation3.txt; struct = grid; interp = neighbor

Variables
  var1 "Variables 1"
    w = (c44*(Ee12+Ee21)^2)/2+(c44*(Ee13+Ee31)^2)/2+(c44*(Ee23+Ee32)^2)/2+(Ee11^2*c11)/2+(Ee22^2*c11)/2+(Ee33^2*c11)/2+Ee11*Ee22*c12+Ee11*Ee33*c12+Ee22*Ee33*c12  // Elastic energy
    W11 = Ee11*c11+Ee22*c12+Ee33*c12  // intermediate stress, component 11
    W12 = (c44*(2*Ee12+2*Ee21))/2  // intermediate stress, component 12
    W13 = (c44*(2*Ee13+2*Ee31))/2  // intermediate stress, component 13
    W21 = (c44*(2*Ee12+2*Ee21))/2  // intermediate stress, component 21
    W22 = Ee11*c12+Ee22*c11+Ee33*c12  // intermediate stress, component 22
    W23 = (c44*(2*Ee23+2*Ee32))/2  // intermediate stress, component 23
    W31 = (c44*(2*Ee13+2*Ee31))/2  // intermediate stress, component 31
    W32 = (c44*(2*Ee23+2*Ee32))/2  // intermediate stress, component 32
    W33 = Ee11*c12+Ee22*c12+Ee33*c11  // intermediate stress, component 33
    Rp11 = 1-(2*q3^2*sin((q1^2+q2^2+q3^2)^(1/2)/2)^2)/(q1^2+q2^2+q3^2)-(2*q2^2*sin((q1^2+q2^2+q3^2)^(1/2)/2)^2)/(q1^2+q2^2+q3^2)  // Rp, component 11
    Rp12 = (2*q1*q2*sin((q1^2+q2^2+q3^2)^(1/2)/2)^2)/(q1^2+q2^2+q3^2)-(q3*sin((q1^2+q2^2+q3^2)^(1/2)))/(q1^2+q2^2+q3^2)^(1/2)  // Rp, component 12
    Rp13 = (q2*sin((q1^2+q2^2+q3^2)^(1/2)))/(q1^2+q2^2+q3^2)^(1/2)+(2*q1*q3*sin((q1^2+q2^2+q3^2)^(1/2)/2)^2)/(q1^2+q2^2+q3^2)  // Rp, component 13
    Rp21 = (q3*sin((q1^2+q2^2+q3^2)^(1/2)))/(q1^2+q2^2+q3^2)^(1/2)+(2*q1*q2*sin((q1^2+q2^2+q3^2)^(1/2)/2)^2)/(q1^2+q2^2+q3^2)  // Rp, component 21
    Rp22 = 1-(2*q3^2*sin((q1^2+q2^2+q3^2)^(1/2)/2)^2)/(q1^2+q2^2+q3^2)-(2*q1^2*sin((q1^2+q2^2+q3^2)^(1/2)/2)^2)/(q1^2+q2^2+q3^2)  // Rp, component 22
    Rp23 = (2*q2*q3*sin((q1^2+q2^2+q3^2)^(1/2)/2)^2)/(q1^2+q2^2+q3^2)-(q1*sin((q1^2+q2^2+q3^2)^(1/2)))/(q1^2+q2^2+q3^2)^(1/2)  // Rp, component 23
    Rp31 = (2*q1*q3*sin((q1^2+q2^2+q3^2)^(1/2)/2)^2)/(q1^2+q2^2+q3^2)-(q2*sin((q1^2+q2^2+q3^2)^(1/2)))/(q1^2+q2^2+q3^2)^(1/2)  // Rp, component 31
    Rp32 = (q1*sin((q1^2+q2^2+q3^2)^(1/2)))/(q1^2+q2^2+q3^2)^(1/2)+(2*q2*q3*sin((q1^2+q2^2+q3^2)^(1/2)/2)^2)/(q1^2+q2^2+q3^2)  // Rp, component 32
    Rp33 = 1-(2*q2^2*sin((q1^2+q2^2+q3^2)^(1/2)/2)^2)/(q1^2+q2^2+q3^2)-(2*q1^2*sin((q1^2+q2^2+q3^2)^(1/2)/2)^2)/(q1^2+q2^2+q3^2)  // Rp, component 33
    Fp11 = Up13*((q2*sin((q1^2+q2^2+q3^2)^(1/2)))/(q1^2+q2^2+q3^2)^(1/2)+(2*q1*q3*sin((q1^2+q2^2+q3^2)^(1/2)/2)^2)/(q1^2+q2^2+q3^2))-Up12*((q3*sin((q1^2+q2^2+q3^2)^(1/2)))/(q1^2+q2^2+q3^2)^(1/2)-(2*q1*q2*sin((q1^2+q2^2+q3^2)^(1/2)/2)^2)/(q1^2+q2^2+q3^2))-Up11*((2*q2^2*sin((q1^2+q2^2+q3^2)^(1/2)/2)^2)/(q1^2+q2^2+q3^2)+(2*q3^2*sin((q1^2+q2^2+q3^2)^(1/2)/2)^2)/(q1^2+q2^2+q3^2)-1)  // Fp, component 11
    Fp12 = Up23*((q2*sin((q1^2+q2^2+q3^2)^(1/2)))/(q1^2+q2^2+q3^2)^(1/2)+(2*q1*q3*sin((q1^2+q2^2+q3^2)^(1/2)/2)^2)/(q1^2+q2^2+q3^2))-Up22*((q3*sin((q1^2+q2^2+q3^2)^(1/2)))/(q1^2+q2^2+q3^2)^(1/2)-(2*q1*q2*sin((q1^2+q2^2+q3^2)^(1/2)/2)^2)/(q1^2+q2^2+q3^2))-Up12*((2*q2^2*sin((q1^2+q2^2+q3^2)^(1/2)/2)^2)/(q1^2+q2^2+q3^2)+(2*q3^2*sin((q1^2+q2^2+q3^2)^(1/2)/2)^2)/(q1^2+q2^2+q3^2)-1)  // Fp, component 12
    Fp13 = Up33*((q2*sin((q1^2+q2^2+q3^2)^(1/2)))/(q1^2+q2^2+q3^2)^(1/2)+(2*q1*q3*sin((q1^2+q2^2+q3^2)^(1/2)/2)^2)/(q1^2+q2^2+q3^2))-Up23*((q3*sin((q1^2+q2^2+q3^2)^(1/2)))/(q1^2+q2^2+q3^2)^(1/2)-(2*q1*q2*sin((q1^2+q2^2+q3^2)^(1/2)/2)^2)/(q1^2+q2^2+q3^2))-Up13*((2*q2^2*sin((q1^2+q2^2+q3^2)^(1/2)/2)^2)/(q1^2+q2^2+q3^2)+(2*q3^2*sin((q1^2+q2^2+q3^2)^(1/2)/2)^2)/(q1^2+q2^2+q3^2)-1)  // Fp, component 13
    Fp21 = Up11*((q3*sin((q1^2+q2^2+q3^2)^(1/2)))/(q1^2+q2^2+q3^2)^(1/2)+(2*q1*q2*sin((q1^2+q2^2+q3^2)^(1/2)/2)^2)/(q1^2+q2^2+q3^2))-Up13*((q1*sin((q1^2+q2^2+q3^2)^(1/2)))/(q1^2+q2^2+q3^2)^(1/2)-(2*q2*q3*sin((q1^2+q2^2+q3^2)^(1/2)/2)^2)/(q1^2+q2^2+q3^2))-Up12*((2*q1^2*sin((q1^2+q2^2+q3^2)^(1/2)/2)^2)/(q1^2+q2^2+q3^2)+(2*q3^2*sin((q1^2+q2^2+q3^2)^(1/2)/2)^2)/(q1^2+q2^2+q3^2)-1)  // Fp, component 21
    Fp22 = Up12*((q3*sin((q1^2+q2^2+q3^2)^(1/2)))/(q1^2+q2^2+q3^2)^(1/2)+(2*q1*q2*sin((q1^2+q2^2+q3^2)^(1/2)/2)^2)/(q1^2+q2^2+q3^2))-Up23*((q1*sin((q1^2+q2^2+q3^2)^(1/2)))/(q1^2+q2^2+q3^2)^(1/2)-(2*q2*q3*sin((q1^2+q2^2+q3^2)^(1/2)/2)^2)/(q1^2+q2^2+q3^2))-Up22*((2*q1^2*sin((q1^2+q2^2+q3^2)^(1/2)/2)^2)/(q1^2+q2^2+q3^2)+(2*q3^2*sin((q1^2+q2^2+q3^2)^(1/2)/2)^2)/(q1^2+q2^2+q3^2)-1)  // Fp, component 22
    Fp23 = Up13*((q3*sin((q1^2+q2^2+q3^2)^(1/2)))/(q1^2+q2^2+q3^2)^(1/2)+(2*q1*q2*sin((q1^2+q2^2+q3^2)^(1/2)/2)^2)/(q1^2+q2^2+q3^2))-Up33*((q1*sin((q1^2+q2^2+q3^2)^(1/2)))/(q1^2+q2^2+q3^2)^(1/2)-(2*q2*q3*sin((q1^2+q2^2+q3^2)^(1/2)/2)^2)/(q1^2+q2^2+q3^2))-Up23*((2*q1^2*sin((q1^2+q2^2+q3^2)^(1/2)/2)^2)/(q1^2+q2^2+q3^2)+(2*q3^2*sin((q1^2+q2^2+q3^2)^(1/2)/2)^2)/(q1^2+q2^2+q3^2)-1)  // Fp, component 23
    Fp31 = Up12*((q1*sin((q1^2+q2^2+q3^2)^(1/2)))/(q1^2+q2^2+q3^2)^(1/2)+(2*q2*q3*sin((q1^2+q2^2+q3^2)^(1/2)/2)^2)/(q1^2+q2^2+q3^2))-Up11*((q2*sin((q1^2+q2^2+q3^2)^(1/2)))/(q1^2+q2^2+q3^2)^(1/2)-(2*q1*q3*sin((q1^2+q2^2+q3^2)^(1/2)/2)^2)/(q1^2+q2^2+q3^2))-Up13*((2*q1^2*sin((q1^2+q2^2+q3^2)^(1/2)/2)^2)/(q1^2+q2^2+q3^2)+(2*q2^2*sin((q1^2+q2^2+q3^2)^(1/2)/2)^2)/(q1^2+q2^2+q3^2)-1)  // Fp, component 31
    Fp32 = Up22*((q1*sin((q1^2+q2^2+q3^2)^(1/2)))/(q1^2+q2^2+q3^2)^(1/2)+(2*q2*q3*sin((q1^2+q2^2+q3^2)^(1/2)/2)^2)/(q1^2+q2^2+q3^2))-Up12*((q2*sin((q1^2+q2^2+q3^2)^(1/2)))/(q1^2+q2^2+q3^2)^(1/2)-(2*q1*q3*sin((q1^2+q2^2+q3^2)^(1/2)/2)^2)/(q1^2+q2^2+q3^2))-Up23*((2*q1^2*sin((q1^2+q2^2+q3^2)^(1/2)/2)^2)/(q1^2+q2^2+q3^2)+(2*q2^2*sin((q1^2+q2^2+q3^2)^(1/2)/2)^2)/(q1^2+q2^2+q3^2)-1)  // Fp, component 32
    Fp33 = Up23*((q1*sin((q1^2+q2^2+q3^2)^(1/2)))/(q1^2+q2^2+q3^2)^(1/2)+(2*q2*q3*sin((q1^2+q2^2+q3^2)^(1/2)/2)^2)/(q1^2+q2^2+q3^2))-Up13*((q2*sin((q1^2+q2^2+q3^2)^(1/2)))/(q1^2+q2^2+q3^2)^(1/2)-(2*q1*q3*sin((q1^2+q2^2+q3^2)^(1/2)/2)^2)/(q1^2+q2^2+q3^2))-Up33*((2*q1^2*sin((q1^2+q2^2+q3^2)^(1/2)/2)^2)/(q1^2+q2^2+q3^2)+(2*q2^2*sin((q1^2+q2^2+q3^2)^(1/2)/2)^2)/(q1^2+q2^2+q3^2)-1)  // Fp, component 33
    da11 = Up11*((4*q1*q2^2*sin((q1^2+q2^2+q3^2)^(1/2)/2)^2)/(q1^2+q2^2+q3^2)^2+(4*q1*q3^2*sin((q1^2+q2^2+q3^2)^(1/2)/2)^2)/(q1^2+q2^2+q3^2)^2-(2*q1*q2^2*sin((q1^2+q2^2+q3^2)^(1/2)/2)*cos((q1^2+q2^2+q3^2)^(1/2)/2))/(q1^2+q2^2+q3^2)^(3/2)-(2*q1*q3^2*sin((q1^2+q2^2+q3^2)^(1/2)/2)*cos((q1^2+q2^2+q3^2)^(1/2)/2))/(q1^2+q2^2+q3^2)^(3/2))+Up12*((2*q2*sin((q1^2+q2^2+q3^2)^(1/2)/2)^2)/(q1^2+q2^2+q3^2)-(q1*q3*cos((q1^2+q2^2+q3^2)^(1/2)))/(q1^2+q2^2+q3^2)+(q1*q3*sin((q1^2+q2^2+q3^2)^(1/2)))/(q1^2+q2^2+q3^2)^(3/2)-(4*q1^2*q2*sin((q1^2+q2^2+q3^2)^(1/2)/2)^2)/(q1^2+q2^2+q3^2)^2+(2*q1^2*q2*sin((q1^2+q2^2+q3^2)^(1/2)/2)*cos((q1^2+q2^2+q3^2)^(1/2)/2))/(q1^2+q2^2+q3^2)^(3/2))+Up13*((2*q3*sin((q1^2+q2^2+q3^2)^(1/2)/2)^2)/(q1^2+q2^2+q3^2)+(q1*q2*cos((q1^2+q2^2+q3^2)^(1/2)))/(q1^2+q2^2+q3^2)-(q1*q2*sin((q1^2+q2^2+q3^2)^(1/2)))/(q1^2+q2^2+q3^2)^(3/2)-(4*q1^2*q3*sin((q1^2+q2^2+q3^2)^(1/2)/2)^2)/(q1^2+q2^2+q3^2)^2+(2*q1^2*q3*sin((q1^2+q2^2+q3^2)^(1/2)/2)*cos((q1^2+q2^2+q3^2)^(1/2)/2))/(q1^2+q2^2+q3^2)^(3/2))  // da, component 11
    da12 = Up13*(sin((q1^2+q2^2+q3^2)^(1/2))/(q1^2+q2^2+q3^2)^(1/2)-(q2^2*sin((q1^2+q2^2+q3^2)^(1/2)))/(q1^2+q2^2+q3^2)^(3/2)+(q2^2*cos((q1^2+q2^2+q3^2)^(1/2)))/(q1^2+q2^2+q3^2)-(4*q1*q2*q3*sin((q1^2+q2^2+q3^2)^(1/2)/2)^2)/(q1^2+q2^2+q3^2)^2+(2*q1*q2*q3*sin((q1^2+q2^2+q3^2)^(1/2)/2)*cos((q1^2+q2^2+q3^2)^(1/2)/2))/(q1^2+q2^2+q3^2)^(3/2))-Up11*((4*q2*sin((q1^2+q2^2+q3^2)^(1/2)/2)^2)/(q1^2+q2^2+q3^2)-(4*q2^3*sin((q1^2+q2^2+q3^2)^(1/2)/2)^2)/(q1^2+q2^2+q3^2)^2-(4*q2*q3^2*sin((q1^2+q2^2+q3^2)^(1/2)/2)^2)/(q1^2+q2^2+q3^2)^2+(2*q2^3*sin((q1^2+q2^2+q3^2)^(1/2)/2)*cos((q1^2+q2^2+q3^2)^(1/2)/2))/(q1^2+q2^2+q3^2)^(3/2)+(2*q2*q3^2*sin((q1^2+q2^2+q3^2)^(1/2)/2)*cos((q1^2+q2^2+q3^2)^(1/2)/2))/(q1^2+q2^2+q3^2)^(3/2))+Up12*((2*q1*sin((q1^2+q2^2+q3^2)^(1/2)/2)^2)/(q1^2+q2^2+q3^2)-(q2*q3*cos((q1^2+q2^2+q3^2)^(1/2)))/(q1^2+q2^2+q3^2)+(q2*q3*sin((q1^2+q2^2+q3^2)^(1/2)))/(q1^2+q2^2+q3^2)^(3/2)-(4*q1*q2^2*sin((q1^2+q2^2+q3^2)^(1/2)/2)^2)/(q1^2+q2^2+q3^2)^2+(2*q1*q2^2*sin((q1^2+q2^2+q3^2)^(1/2)/2)*cos((q1^2+q2^2+q3^2)^(1/2)/2))/(q1^2+q2^2+q3^2)^(3/2))  // da, component 12
    da13 = Up13*((2*q1*sin((q1^2+q2^2+q3^2)^(1/2)/2)^2)/(q1^2+q2^2+q3^2)+(q2*q3*cos((q1^2+q2^2+q3^2)^(1/2)))/(q1^2+q2^2+q3^2)-(q2*q3*sin((q1^2+q2^2+q3^2)^(1/2)))/(q1^2+q2^2+q3^2)^(3/2)-(4*q1*q3^2*sin((q1^2+q2^2+q3^2)^(1/2)/2)^2)/(q1^2+q2^2+q3^2)^2+(2*q1*q3^2*sin((q1^2+q2^2+q3^2)^(1/2)/2)*cos((q1^2+q2^2+q3^2)^(1/2)/2))/(q1^2+q2^2+q3^2)^(3/2))-Up11*((4*q3*sin((q1^2+q2^2+q3^2)^(1/2)/2)^2)/(q1^2+q2^2+q3^2)-(4*q3^3*sin((q1^2+q2^2+q3^2)^(1/2)/2)^2)/(q1^2+q2^2+q3^2)^2-(4*q2^2*q3*sin((q1^2+q2^2+q3^2)^(1/2)/2)^2)/(q1^2+q2^2+q3^2)^2+(2*q3^3*sin((q1^2+q2^2+q3^2)^(1/2)/2)*cos((q1^2+q2^2+q3^2)^(1/2)/2))/(q1^2+q2^2+q3^2)^(3/2)+(2*q2^2*q3*sin((q1^2+q2^2+q3^2)^(1/2)/2)*cos((q1^2+q2^2+q3^2)^(1/2)/2))/(q1^2+q2^2+q3^2)^(3/2))-Up12*(sin((q1^2+q2^2+q3^2)^(1/2))/(q1^2+q2^2+q3^2)^(1/2)-(q3^2*sin((q1^2+q2^2+q3^2)^(1/2)))/(q1^2+q2^2+q3^2)^(3/2)+(q3^2*cos((q1^2+q2^2+q3^2)^(1/2)))/(q1^2+q2^2+q3^2)+(4*q1*q2*q3*sin((q1^2+q2^2+q3^2)^(1/2)/2)^2)/(q1^2+q2^2+q3^2)^2-(2*q1*q2*q3*sin((q1^2+q2^2+q3^2)^(1/2)/2)*cos((q1^2+q2^2+q3^2)^(1/2)/2))/(q1^2+q2^2+q3^2)^(3/2))  // da, component 13
    da14 = 1-(2*q3^2*sin((q1^2+q2^2+q3^2)^(1/2)/2)^2)/(q1^2+q2^2+q3^2)-(2*q2^2*sin((q1^2+q2^2+q3^2)^(1/2)/2)^2)/(q1^2+q2^2+q3^2)  // da, component 14
    da15 = 0  // da, component 15
    da16 = 0  // da, component 16
    da17 = (2*q1*q2*sin((q1^2+q2^2+q3^2)^(1/2)/2)^2)/(q1^2+q2^2+q3^2)-(q3*sin((q1^2+q2^2+q3^2)^(1/2)))/(q1^2+q2^2+q3^2)^(1/2)  // da, component 17
    da18 = (q2*sin((q1^2+q2^2+q3^2)^(1/2)))/(q1^2+q2^2+q3^2)^(1/2)+(2*q1*q3*sin((q1^2+q2^2+q3^2)^(1/2)/2)^2)/(q1^2+q2^2+q3^2)  // da, component 18
    da19 = 0  // da, component 19
    da21 = Up12*((4*q1*q2^2*sin((q1^2+q2^2+q3^2)^(1/2)/2)^2)/(q1^2+q2^2+q3^2)^2+(4*q1*q3^2*sin((q1^2+q2^2+q3^2)^(1/2)/2)^2)/(q1^2+q2^2+q3^2)^2-(2*q1*q2^2*sin((q1^2+q2^2+q3^2)^(1/2)/2)*cos((q1^2+q2^2+q3^2)^(1/2)/2))/(q1^2+q2^2+q3^2)^(3/2)-(2*q1*q3^2*sin((q1^2+q2^2+q3^2)^(1/2)/2)*cos((q1^2+q2^2+q3^2)^(1/2)/2))/(q1^2+q2^2+q3^2)^(3/2))+Up22*((2*q2*sin((q1^2+q2^2+q3^2)^(1/2)/2)^2)/(q1^2+q2^2+q3^2)-(q1*q3*cos((q1^2+q2^2+q3^2)^(1/2)))/(q1^2+q2^2+q3^2)+(q1*q3*sin((q1^2+q2^2+q3^2)^(1/2)))/(q1^2+q2^2+q3^2)^(3/2)-(4*q1^2*q2*sin((q1^2+q2^2+q3^2)^(1/2)/2)^2)/(q1^2+q2^2+q3^2)^2+(2*q1^2*q2*sin((q1^2+q2^2+q3^2)^(1/2)/2)*cos((q1^2+q2^2+q3^2)^(1/2)/2))/(q1^2+q2^2+q3^2)^(3/2))+Up23*((2*q3*sin((q1^2+q2^2+q3^2)^(1/2)/2)^2)/(q1^2+q2^2+q3^2)+(q1*q2*cos((q1^2+q2^2+q3^2)^(1/2)))/(q1^2+q2^2+q3^2)-(q1*q2*sin((q1^2+q2^2+q3^2)^(1/2)))/(q1^2+q2^2+q3^2)^(3/2)-(4*q1^2*q3*sin((q1^2+q2^2+q3^2)^(1/2)/2)^2)/(q1^2+q2^2+q3^2)^2+(2*q1^2*q3*sin((q1^2+q2^2+q3^2)^(1/2)/2)*cos((q1^2+q2^2+q3^2)^(1/2)/2))/(q1^2+q2^2+q3^2)^(3/2))  // da, component 21
    da22 = Up23*(sin((q1^2+q2^2+q3^2)^(1/2))/(q1^2+q2^2+q3^2)^(1/2)-(q2^2*sin((q1^2+q2^2+q3^2)^(1/2)))/(q1^2+q2^2+q3^2)^(3/2)+(q2^2*cos((q1^2+q2^2+q3^2)^(1/2)))/(q1^2+q2^2+q3^2)-(4*q1*q2*q3*sin((q1^2+q2^2+q3^2)^(1/2)/2)^2)/(q1^2+q2^2+q3^2)^2+(2*q1*q2*q3*sin((q1^2+q2^2+q3^2)^(1/2)/2)*cos((q1^2+q2^2+q3^2)^(1/2)/2))/(q1^2+q2^2+q3^2)^(3/2))-Up12*((4*q2*sin((q1^2+q2^2+q3^2)^(1/2)/2)^2)/(q1^2+q2^2+q3^2)-(4*q2^3*sin((q1^2+q2^2+q3^2)^(1/2)/2)^2)/(q1^2+q2^2+q3^2)^2-(4*q2*q3^2*sin((q1^2+q2^2+q3^2)^(1/2)/2)^2)/(q1^2+q2^2+q3^2)^2+(2*q2^3*sin((q1^2+q2^2+q3^2)^(1/2)/2)*cos((q1^2+q2^2+q3^2)^(1/2)/2))/(q1^2+q2^2+q3^2)^(3/2)+(2*q2*q3^2*sin((q1^2+q2^2+q3^2)^(1/2)/2)*cos((q1^2+q2^2+q3^2)^(1/2)/2))/(q1^2+q2^2+q3^2)^(3/2))+Up22*((2*q1*sin((q1^2+q2^2+q3^2)^(1/2)/2)^2)/(q1^2+q2^2+q3^2)-(q2*q3*cos((q1^2+q2^2+q3^2)^(1/2)))/(q1^2+q2^2+q3^2)+(q2*q3*sin((q1^2+q2^2+q3^2)^(1/2)))/(q1^2+q2^2+q3^2)^(3/2)-(4*q1*q2^2*sin((q1^2+q2^2+q3^2)^(1/2)/2)^2)/(q1^2+q2^2+q3^2)^2+(2*q1*q2^2*sin((q1^2+q2^2+q3^2)^(1/2)/2)*cos((q1^2+q2^2+q3^2)^(1/2)/2))/(q1^2+q2^2+q3^2)^(3/2))  // da, component 22
    da23 = Up23*((2*q1*sin((q1^2+q2^2+q3^2)^(1/2)/2)^2)/(q1^2+q2^2+q3^2)+(q2*q3*cos((q1^2+q2^2+q3^2)^(1/2)))/(q1^2+q2^2+q3^2)-(q2*q3*sin((q1^2+q2^2+q3^2)^(1/2)))/(q1^2+q2^2+q3^2)^(3/2)-(4*q1*q3^2*sin((q1^2+q2^2+q3^2)^(1/2)/2)^2)/(q1^2+q2^2+q3^2)^2+(2*q1*q3^2*sin((q1^2+q2^2+q3^2)^(1/2)/2)*cos((q1^2+q2^2+q3^2)^(1/2)/2))/(q1^2+q2^2+q3^2)^(3/2))-Up12*((4*q3*sin((q1^2+q2^2+q3^2)^(1/2)/2)^2)/(q1^2+q2^2+q3^2)-(4*q3^3*sin((q1^2+q2^2+q3^2)^(1/2)/2)^2)/(q1^2+q2^2+q3^2)^2-(4*q2^2*q3*sin((q1^2+q2^2+q3^2)^(1/2)/2)^2)/(q1^2+q2^2+q3^2)^2+(2*q3^3*sin((q1^2+q2^2+q3^2)^(1/2)/2)*cos((q1^2+q2^2+q3^2)^(1/2)/2))/(q1^2+q2^2+q3^2)^(3/2)+(2*q2^2*q3*sin((q1^2+q2^2+q3^2)^(1/2)/2)*cos((q1^2+q2^2+q3^2)^(1/2)/2))/(q1^2+q2^2+q3^2)^(3/2))-Up22*(sin((q1^2+q2^2+q3^2)^(1/2))/(q1^2+q2^2+q3^2)^(1/2)-(q3^2*sin((q1^2+q2^2+q3^2)^(1/2)))/(q1^2+q2^2+q3^2)^(3/2)+(q3^2*cos((q1^2+q2^2+q3^2)^(1/2)))/(q1^2+q2^2+q3^2)+(4*q1*q2*q3*sin((q1^2+q2^2+q3^2)^(1/2)/2)^2)/(q1^2+q2^2+q3^2)^2-(2*q1*q2*q3*sin((q1^2+q2^2+q3^2)^(1/2)/2)*cos((q1^2+q2^2+q3^2)^(1/2)/2))/(q1^2+q2^2+q3^2)^(3/2))  // da, component 23
    da24 = 0  // da, component 24
    da25 = (2*q1*q2*sin((q1^2+q2^2+q3^2)^(1/2)/2)^2)/(q1^2+q2^2+q3^2)-(q3*sin((q1^2+q2^2+q3^2)^(1/2)))/(q1^2+q2^2+q3^2)^(1/2)  // da, component 25
    da26 = 0  // da, component 26
    da27 = 1-(2*q3^2*sin((q1^2+q2^2+q3^2)^(1/2)/2)^2)/(q1^2+q2^2+q3^2)-(2*q2^2*sin((q1^2+q2^2+q3^2)^(1/2)/2)^2)/(q1^2+q2^2+q3^2)  // da, component 27
    da28 = 0  // da, component 28
    da29 = (q2*sin((q1^2+q2^2+q3^2)^(1/2)))/(q1^2+q2^2+q3^2)^(1/2)+(2*q1*q3*sin((q1^2+q2^2+q3^2)^(1/2)/2)^2)/(q1^2+q2^2+q3^2)  // da, component 29
    da31 = Up13*((4*q1*q2^2*sin((q1^2+q2^2+q3^2)^(1/2)/2)^2)/(q1^2+q2^2+q3^2)^2+(4*q1*q3^2*sin((q1^2+q2^2+q3^2)^(1/2)/2)^2)/(q1^2+q2^2+q3^2)^2-(2*q1*q2^2*sin((q1^2+q2^2+q3^2)^(1/2)/2)*cos((q1^2+q2^2+q3^2)^(1/2)/2))/(q1^2+q2^2+q3^2)^(3/2)-(2*q1*q3^2*sin((q1^2+q2^2+q3^2)^(1/2)/2)*cos((q1^2+q2^2+q3^2)^(1/2)/2))/(q1^2+q2^2+q3^2)^(3/2))+Up23*((2*q2*sin((q1^2+q2^2+q3^2)^(1/2)/2)^2)/(q1^2+q2^2+q3^2)-(q1*q3*cos((q1^2+q2^2+q3^2)^(1/2)))/(q1^2+q2^2+q3^2)+(q1*q3*sin((q1^2+q2^2+q3^2)^(1/2)))/(q1^2+q2^2+q3^2)^(3/2)-(4*q1^2*q2*sin((q1^2+q2^2+q3^2)^(1/2)/2)^2)/(q1^2+q2^2+q3^2)^2+(2*q1^2*q2*sin((q1^2+q2^2+q3^2)^(1/2)/2)*cos((q1^2+q2^2+q3^2)^(1/2)/2))/(q1^2+q2^2+q3^2)^(3/2))+Up33*((2*q3*sin((q1^2+q2^2+q3^2)^(1/2)/2)^2)/(q1^2+q2^2+q3^2)+(q1*q2*cos((q1^2+q2^2+q3^2)^(1/2)))/(q1^2+q2^2+q3^2)-(q1*q2*sin((q1^2+q2^2+q3^2)^(1/2)))/(q1^2+q2^2+q3^2)^(3/2)-(4*q1^2*q3*sin((q1^2+q2^2+q3^2)^(1/2)/2)^2)/(q1^2+q2^2+q3^2)^2+(2*q1^2*q3*sin((q1^2+q2^2+q3^2)^(1/2)/2)*cos((q1^2+q2^2+q3^2)^(1/2)/2))/(q1^2+q2^2+q3^2)^(3/2))  // da, component 31
    da32 = Up33*(sin((q1^2+q2^2+q3^2)^(1/2))/(q1^2+q2^2+q3^2)^(1/2)-(q2^2*sin((q1^2+q2^2+q3^2)^(1/2)))/(q1^2+q2^2+q3^2)^(3/2)+(q2^2*cos((q1^2+q2^2+q3^2)^(1/2)))/(q1^2+q2^2+q3^2)-(4*q1*q2*q3*sin((q1^2+q2^2+q3^2)^(1/2)/2)^2)/(q1^2+q2^2+q3^2)^2+(2*q1*q2*q3*sin((q1^2+q2^2+q3^2)^(1/2)/2)*cos((q1^2+q2^2+q3^2)^(1/2)/2))/(q1^2+q2^2+q3^2)^(3/2))-Up13*((4*q2*sin((q1^2+q2^2+q3^2)^(1/2)/2)^2)/(q1^2+q2^2+q3^2)-(4*q2^3*sin((q1^2+q2^2+q3^2)^(1/2)/2)^2)/(q1^2+q2^2+q3^2)^2-(4*q2*q3^2*sin((q1^2+q2^2+q3^2)^(1/2)/2)^2)/(q1^2+q2^2+q3^2)^2+(2*q2^3*sin((q1^2+q2^2+q3^2)^(1/2)/2)*cos((q1^2+q2^2+q3^2)^(1/2)/2))/(q1^2+q2^2+q3^2)^(3/2)+(2*q2*q3^2*sin((q1^2+q2^2+q3^2)^(1/2)/2)*cos((q1^2+q2^2+q3^2)^(1/2)/2))/(q1^2+q2^2+q3^2)^(3/2))+Up23*((2*q1*sin((q1^2+q2^2+q3^2)^(1/2)/2)^2)/(q1^2+q2^2+q3^2)-(q2*q3*cos((q1^2+q2^2+q3^2)^(1/2)))/(q1^2+q2^2+q3^2)+(q2*q3*sin((q1^2+q2^2+q3^2)^(1/2)))/(q1^2+q2^2+q3^2)^(3/2)-(4*q1*q2^2*sin((q1^2+q2^2+q3^2)^(1/2)/2)^2)/(q1^2+q2^2+q3^2)^2+(2*q1*q2^2*sin((q1^2+q2^2+q3^2)^(1/2)/2)*cos((q1^2+q2^2+q3^2)^(1/2)/2))/(q1^2+q2^2+q3^2)^(3/2))  // da, component 32
    da33 = Up33*((2*q1*sin((q1^2+q2^2+q3^2)^(1/2)/2)^2)/(q1^2+q2^2+q3^2)+(q2*q3*cos((q1^2+q2^2+q3^2)^(1/2)))/(q1^2+q2^2+q3^2)-(q2*q3*sin((q1^2+q2^2+q3^2)^(1/2)))/(q1^2+q2^2+q3^2)^(3/2)-(4*q1*q3^2*sin((q1^2+q2^2+q3^2)^(1/2)/2)^2)/(q1^2+q2^2+q3^2)^2+(2*q1*q3^2*sin((q1^2+q2^2+q3^2)^(1/2)/2)*cos((q1^2+q2^2+q3^2)^(1/2)/2))/(q1^2+q2^2+q3^2)^(3/2))-Up13*((4*q3*sin((q1^2+q2^2+q3^2)^(1/2)/2)^2)/(q1^2+q2^2+q3^2)-(4*q3^3*sin((q1^2+q2^2+q3^2)^(1/2)/2)^2)/(q1^2+q2^2+q3^2)^2-(4*q2^2*q3*sin((q1^2+q2^2+q3^2)^(1/2)/2)^2)/(q1^2+q2^2+q3^2)^2+(2*q3^3*sin((q1^2+q2^2+q3^2)^(1/2)/2)*cos((q1^2+q2^2+q3^2)^(1/2)/2))/(q1^2+q2^2+q3^2)^(3/2)+(2*q2^2*q3*sin((q1^2+q2^2+q3^2)^(1/2)/2)*cos((q1^2+q2^2+q3^2)^(1/2)/2))/(q1^2+q2^2+q3^2)^(3/2))-Up23*(sin((q1^2+q2^2+q3^2)^(1/2))/(q1^2+q2^2+q3^2)^(1/2)-(q3^2*sin((q1^2+q2^2+q3^2)^(1/2)))/(q1^2+q2^2+q3^2)^(3/2)+(q3^2*cos((q1^2+q2^2+q3^2)^(1/2)))/(q1^2+q2^2+q3^2)+(4*q1*q2*q3*sin((q1^2+q2^2+q3^2)^(1/2)/2)^2)/(q1^2+q2^2+q3^2)^2-(2*q1*q2*q3*sin((q1^2+q2^2+q3^2)^(1/2)/2)*cos((q1^2+q2^2+q3^2)^(1/2)/2))/(q1^2+q2^2+q3^2)^(3/2))  // da, component 33
    da34 = 0  // da, component 34
    da35 = 0  // da, component 35
    da36 = (q2*sin((q1^2+q2^2+q3^2)^(1/2)))/(q1^2+q2^2+q3^2)^(1/2)+(2*q1*q3*sin((q1^2+q2^2+q3^2)^(1/2)/2)^2)/(q1^2+q2^2+q3^2)  // da, component 36
    da37 = 0  // da, component 37
    da38 = 1-(2*q3^2*sin((q1^2+q2^2+q3^2)^(1/2)/2)^2)/(q1^2+q2^2+q3^2)-(2*q2^2*sin((q1^2+q2^2+q3^2)^(1/2)/2)^2)/(q1^2+q2^2+q3^2)  // da, component 38
    da39 = (2*q1*q2*sin((q1^2+q2^2+q3^2)^(1/2)/2)^2)/(q1^2+q2^2+q3^2)-(q3*sin((q1^2+q2^2+q3^2)^(1/2)))/(q1^2+q2^2+q3^2)^(1/2)  // da, component 39
    da41 = Up11*((2*q2*sin((q1^2+q2^2+q3^2)^(1/2)/2)^2)/(q1^2+q2^2+q3^2)+(q1*q3*cos((q1^2+q2^2+q3^2)^(1/2)))/(q1^2+q2^2+q3^2)-(q1*q3*sin((q1^2+q2^2+q3^2)^(1/2)))/(q1^2+q2^2+q3^2)^(3/2)-(4*q1^2*q2*sin((q1^2+q2^2+q3^2)^(1/2)/2)^2)/(q1^2+q2^2+q3^2)^2+(2*q1^2*q2*sin((q1^2+q2^2+q3^2)^(1/2)/2)*cos((q1^2+q2^2+q3^2)^(1/2)/2))/(q1^2+q2^2+q3^2)^(3/2))-Up12*((4*q1*sin((q1^2+q2^2+q3^2)^(1/2)/2)^2)/(q1^2+q2^2+q3^2)-(4*q1^3*sin((q1^2+q2^2+q3^2)^(1/2)/2)^2)/(q1^2+q2^2+q3^2)^2-(4*q1*q3^2*sin((q1^2+q2^2+q3^2)^(1/2)/2)^2)/(q1^2+q2^2+q3^2)^2+(2*q1^3*sin((q1^2+q2^2+q3^2)^(1/2)/2)*cos((q1^2+q2^2+q3^2)^(1/2)/2))/(q1^2+q2^2+q3^2)^(3/2)+(2*q1*q3^2*sin((q1^2+q2^2+q3^2)^(1/2)/2)*cos((q1^2+q2^2+q3^2)^(1/2)/2))/(q1^2+q2^2+q3^2)^(3/2))-Up13*(sin((q1^2+q2^2+q3^2)^(1/2))/(q1^2+q2^2+q3^2)^(1/2)-(q1^2*sin((q1^2+q2^2+q3^2)^(1/2)))/(q1^2+q2^2+q3^2)^(3/2)+(q1^2*cos((q1^2+q2^2+q3^2)^(1/2)))/(q1^2+q2^2+q3^2)+(4*q1*q2*q3*sin((q1^2+q2^2+q3^2)^(1/2)/2)^2)/(q1^2+q2^2+q3^2)^2-(2*q1*q2*q3*sin((q1^2+q2^2+q3^2)^(1/2)/2)*cos((q1^2+q2^2+q3^2)^(1/2)/2))/(q1^2+q2^2+q3^2)^(3/2))  // da, component 41
    da42 = Up12*((4*q1^2*q2*sin((q1^2+q2^2+q3^2)^(1/2)/2)^2)/(q1^2+q2^2+q3^2)^2+(4*q2*q3^2*sin((q1^2+q2^2+q3^2)^(1/2)/2)^2)/(q1^2+q2^2+q3^2)^2-(2*q1^2*q2*sin((q1^2+q2^2+q3^2)^(1/2)/2)*cos((q1^2+q2^2+q3^2)^(1/2)/2))/(q1^2+q2^2+q3^2)^(3/2)-(2*q2*q3^2*sin((q1^2+q2^2+q3^2)^(1/2)/2)*cos((q1^2+q2^2+q3^2)^(1/2)/2))/(q1^2+q2^2+q3^2)^(3/2))+Up11*((2*q1*sin((q1^2+q2^2+q3^2)^(1/2)/2)^2)/(q1^2+q2^2+q3^2)+(q2*q3*cos((q1^2+q2^2+q3^2)^(1/2)))/(q1^2+q2^2+q3^2)-(q2*q3*sin((q1^2+q2^2+q3^2)^(1/2)))/(q1^2+q2^2+q3^2)^(3/2)-(4*q1*q2^2*sin((q1^2+q2^2+q3^2)^(1/2)/2)^2)/(q1^2+q2^2+q3^2)^2+(2*q1*q2^2*sin((q1^2+q2^2+q3^2)^(1/2)/2)*cos((q1^2+q2^2+q3^2)^(1/2)/2))/(q1^2+q2^2+q3^2)^(3/2))+Up13*((2*q3*sin((q1^2+q2^2+q3^2)^(1/2)/2)^2)/(q1^2+q2^2+q3^2)-(q1*q2*cos((q1^2+q2^2+q3^2)^(1/2)))/(q1^2+q2^2+q3^2)+(q1*q2*sin((q1^2+q2^2+q3^2)^(1/2)))/(q1^2+q2^2+q3^2)^(3/2)-(4*q2^2*q3*sin((q1^2+q2^2+q3^2)^(1/2)/2)^2)/(q1^2+q2^2+q3^2)^2+(2*q2^2*q3*sin((q1^2+q2^2+q3^2)^(1/2)/2)*cos((q1^2+q2^2+q3^2)^(1/2)/2))/(q1^2+q2^2+q3^2)^(3/2))  // da, component 42
    da43 = Up11*(sin((q1^2+q2^2+q3^2)^(1/2))/(q1^2+q2^2+q3^2)^(1/2)-(q3^2*sin((q1^2+q2^2+q3^2)^(1/2)))/(q1^2+q2^2+q3^2)^(3/2)+(q3^2*cos((q1^2+q2^2+q3^2)^(1/2)))/(q1^2+q2^2+q3^2)-(4*q1*q2*q3*sin((q1^2+q2^2+q3^2)^(1/2)/2)^2)/(q1^2+q2^2+q3^2)^2+(2*q1*q2*q3*sin((q1^2+q2^2+q3^2)^(1/2)/2)*cos((q1^2+q2^2+q3^2)^(1/2)/2))/(q1^2+q2^2+q3^2)^(3/2))-Up12*((4*q3*sin((q1^2+q2^2+q3^2)^(1/2)/2)^2)/(q1^2+q2^2+q3^2)-(4*q3^3*sin((q1^2+q2^2+q3^2)^(1/2)/2)^2)/(q1^2+q2^2+q3^2)^2-(4*q1^2*q3*sin((q1^2+q2^2+q3^2)^(1/2)/2)^2)/(q1^2+q2^2+q3^2)^2+(2*q3^3*sin((q1^2+q2^2+q3^2)^(1/2)/2)*cos((q1^2+q2^2+q3^2)^(1/2)/2))/(q1^2+q2^2+q3^2)^(3/2)+(2*q1^2*q3*sin((q1^2+q2^2+q3^2)^(1/2)/2)*cos((q1^2+q2^2+q3^2)^(1/2)/2))/(q1^2+q2^2+q3^2)^(3/2))+Up13*((2*q2*sin((q1^2+q2^2+q3^2)^(1/2)/2)^2)/(q1^2+q2^2+q3^2)-(q1*q3*cos((q1^2+q2^2+q3^2)^(1/2)))/(q1^2+q2^2+q3^2)+(q1*q3*sin((q1^2+q2^2+q3^2)^(1/2)))/(q1^2+q2^2+q3^2)^(3/2)-(4*q2*q3^2*sin((q1^2+q2^2+q3^2)^(1/2)/2)^2)/(q1^2+q2^2+q3^2)^2+(2*q2*q3^2*sin((q1^2+q2^2+q3^2)^(1/2)/2)*cos((q1^2+q2^2+q3^2)^(1/2)/2))/(q1^2+q2^2+q3^2)^(3/2))  // da, component 43
    da44 = (q3*sin((q1^2+q2^2+q3^2)^(1/2)))/(q1^2+q2^2+q3^2)^(1/2)+(2*q1*q2*sin((q1^2+q2^2+q3^2)^(1/2)/2)^2)/(q1^2+q2^2+q3^2)  // da, component 44
    da45 = 0  // da, component 45
    da46 = 0  // da, component 46
    da47 = 1-(2*q3^2*sin((q1^2+q2^2+q3^2)^(1/2)/2)^2)/(q1^2+q2^2+q3^2)-(2*q1^2*sin((q1^2+q2^2+q3^2)^(1/2)/2)^2)/(q1^2+q2^2+q3^2)  // da, component 47
    da48 = (2*q2*q3*sin((q1^2+q2^2+q3^2)^(1/2)/2)^2)/(q1^2+q2^2+q3^2)-(q1*sin((q1^2+q2^2+q3^2)^(1/2)))/(q1^2+q2^2+q3^2)^(1/2)  // da, component 48
    da49 = 0  // da, component 49
    da51 = Up12*((2*q2*sin((q1^2+q2^2+q3^2)^(1/2)/2)^2)/(q1^2+q2^2+q3^2)+(q1*q3*cos((q1^2+q2^2+q3^2)^(1/2)))/(q1^2+q2^2+q3^2)-(q1*q3*sin((q1^2+q2^2+q3^2)^(1/2)))/(q1^2+q2^2+q3^2)^(3/2)-(4*q1^2*q2*sin((q1^2+q2^2+q3^2)^(1/2)/2)^2)/(q1^2+q2^2+q3^2)^2+(2*q1^2*q2*sin((q1^2+q2^2+q3^2)^(1/2)/2)*cos((q1^2+q2^2+q3^2)^(1/2)/2))/(q1^2+q2^2+q3^2)^(3/2))-Up22*((4*q1*sin((q1^2+q2^2+q3^2)^(1/2)/2)^2)/(q1^2+q2^2+q3^2)-(4*q1^3*sin((q1^2+q2^2+q3^2)^(1/2)/2)^2)/(q1^2+q2^2+q3^2)^2-(4*q1*q3^2*sin((q1^2+q2^2+q3^2)^(1/2)/2)^2)/(q1^2+q2^2+q3^2)^2+(2*q1^3*sin((q1^2+q2^2+q3^2)^(1/2)/2)*cos((q1^2+q2^2+q3^2)^(1/2)/2))/(q1^2+q2^2+q3^2)^(3/2)+(2*q1*q3^2*sin((q1^2+q2^2+q3^2)^(1/2)/2)*cos((q1^2+q2^2+q3^2)^(1/2)/2))/(q1^2+q2^2+q3^2)^(3/2))-Up23*(sin((q1^2+q2^2+q3^2)^(1/2))/(q1^2+q2^2+q3^2)^(1/2)-(q1^2*sin((q1^2+q2^2+q3^2)^(1/2)))/(q1^2+q2^2+q3^2)^(3/2)+(q1^2*cos((q1^2+q2^2+q3^2)^(1/2)))/(q1^2+q2^2+q3^2)+(4*q1*q2*q3*sin((q1^2+q2^2+q3^2)^(1/2)/2)^2)/(q1^2+q2^2+q3^2)^2-(2*q1*q2*q3*sin((q1^2+q2^2+q3^2)^(1/2)/2)*cos((q1^2+q2^2+q3^2)^(1/2)/2))/(q1^2+q2^2+q3^2)^(3/2))  // da, component 51
    da52 = Up22*((4*q1^2*q2*sin((q1^2+q2^2+q3^2)^(1/2)/2)^2)/(q1^2+q2^2+q3^2)^2+(4*q2*q3^2*sin((q1^2+q2^2+q3^2)^(1/2)/2)^2)/(q1^2+q2^2+q3^2)^2-(2*q1^2*q2*sin((q1^2+q2^2+q3^2)^(1/2)/2)*cos((q1^2+q2^2+q3^2)^(1/2)/2))/(q1^2+q2^2+q3^2)^(3/2)-(2*q2*q3^2*sin((q1^2+q2^2+q3^2)^(1/2)/2)*cos((q1^2+q2^2+q3^2)^(1/2)/2))/(q1^2+q2^2+q3^2)^(3/2))+Up12*((2*q1*sin((q1^2+q2^2+q3^2)^(1/2)/2)^2)/(q1^2+q2^2+q3^2)+(q2*q3*cos((q1^2+q2^2+q3^2)^(1/2)))/(q1^2+q2^2+q3^2)-(q2*q3*sin((q1^2+q2^2+q3^2)^(1/2)))/(q1^2+q2^2+q3^2)^(3/2)-(4*q1*q2^2*sin((q1^2+q2^2+q3^2)^(1/2)/2)^2)/(q1^2+q2^2+q3^2)^2+(2*q1*q2^2*sin((q1^2+q2^2+q3^2)^(1/2)/2)*cos((q1^2+q2^2+q3^2)^(1/2)/2))/(q1^2+q2^2+q3^2)^(3/2))+Up23*((2*q3*sin((q1^2+q2^2+q3^2)^(1/2)/2)^2)/(q1^2+q2^2+q3^2)-(q1*q2*cos((q1^2+q2^2+q3^2)^(1/2)))/(q1^2+q2^2+q3^2)+(q1*q2*sin((q1^2+q2^2+q3^2)^(1/2)))/(q1^2+q2^2+q3^2)^(3/2)-(4*q2^2*q3*sin((q1^2+q2^2+q3^2)^(1/2)/2)^2)/(q1^2+q2^2+q3^2)^2+(2*q2^2*q3*sin((q1^2+q2^2+q3^2)^(1/2)/2)*cos((q1^2+q2^2+q3^2)^(1/2)/2))/(q1^2+q2^2+q3^2)^(3/2))  // da, component 52
    da53 = Up12*(sin((q1^2+q2^2+q3^2)^(1/2))/(q1^2+q2^2+q3^2)^(1/2)-(q3^2*sin((q1^2+q2^2+q3^2)^(1/2)))/(q1^2+q2^2+q3^2)^(3/2)+(q3^2*cos((q1^2+q2^2+q3^2)^(1/2)))/(q1^2+q2^2+q3^2)-(4*q1*q2*q3*sin((q1^2+q2^2+q3^2)^(1/2)/2)^2)/(q1^2+q2^2+q3^2)^2+(2*q1*q2*q3*sin((q1^2+q2^2+q3^2)^(1/2)/2)*cos((q1^2+q2^2+q3^2)^(1/2)/2))/(q1^2+q2^2+q3^2)^(3/2))-Up22*((4*q3*sin((q1^2+q2^2+q3^2)^(1/2)/2)^2)/(q1^2+q2^2+q3^2)-(4*q3^3*sin((q1^2+q2^2+q3^2)^(1/2)/2)^2)/(q1^2+q2^2+q3^2)^2-(4*q1^2*q3*sin((q1^2+q2^2+q3^2)^(1/2)/2)^2)/(q1^2+q2^2+q3^2)^2+(2*q3^3*sin((q1^2+q2^2+q3^2)^(1/2)/2)*cos((q1^2+q2^2+q3^2)^(1/2)/2))/(q1^2+q2^2+q3^2)^(3/2)+(2*q1^2*q3*sin((q1^2+q2^2+q3^2)^(1/2)/2)*cos((q1^2+q2^2+q3^2)^(1/2)/2))/(q1^2+q2^2+q3^2)^(3/2))+Up23*((2*q2*sin((q1^2+q2^2+q3^2)^(1/2)/2)^2)/(q1^2+q2^2+q3^2)-(q1*q3*cos((q1^2+q2^2+q3^2)^(1/2)))/(q1^2+q2^2+q3^2)+(q1*q3*sin((q1^2+q2^2+q3^2)^(1/2)))/(q1^2+q2^2+q3^2)^(3/2)-(4*q2*q3^2*sin((q1^2+q2^2+q3^2)^(1/2)/2)^2)/(q1^2+q2^2+q3^2)^2+(2*q2*q3^2*sin((q1^2+q2^2+q3^2)^(1/2)/2)*cos((q1^2+q2^2+q3^2)^(1/2)/2))/(q1^2+q2^2+q3^2)^(3/2))  // da, component 53
    da54 = 0  // da, component 54
    da55 = 1-(2*q3^2*sin((q1^2+q2^2+q3^2)^(1/2)/2)^2)/(q1^2+q2^2+q3^2)-(2*q1^2*sin((q1^2+q2^2+q3^2)^(1/2)/2)^2)/(q1^2+q2^2+q3^2)  // da, component 55
    da56 = 0  // da, component 56
    da57 = (q3*sin((q1^2+q2^2+q3^2)^(1/2)))/(q1^2+q2^2+q3^2)^(1/2)+(2*q1*q2*sin((q1^2+q2^2+q3^2)^(1/2)/2)^2)/(q1^2+q2^2+q3^2)  // da, component 57
    da58 = 0  // da, component 58
    da59 = (2*q2*q3*sin((q1^2+q2^2+q3^2)^(1/2)/2)^2)/(q1^2+q2^2+q3^2)-(q1*sin((q1^2+q2^2+q3^2)^(1/2)))/(q1^2+q2^2+q3^2)^(1/2)  // da, component 59
    da61 = Up13*((2*q2*sin((q1^2+q2^2+q3^2)^(1/2)/2)^2)/(q1^2+q2^2+q3^2)+(q1*q3*cos((q1^2+q2^2+q3^2)^(1/2)))/(q1^2+q2^2+q3^2)-(q1*q3*sin((q1^2+q2^2+q3^2)^(1/2)))/(q1^2+q2^2+q3^2)^(3/2)-(4*q1^2*q2*sin((q1^2+q2^2+q3^2)^(1/2)/2)^2)/(q1^2+q2^2+q3^2)^2+(2*q1^2*q2*sin((q1^2+q2^2+q3^2)^(1/2)/2)*cos((q1^2+q2^2+q3^2)^(1/2)/2))/(q1^2+q2^2+q3^2)^(3/2))-Up23*((4*q1*sin((q1^2+q2^2+q3^2)^(1/2)/2)^2)/(q1^2+q2^2+q3^2)-(4*q1^3*sin((q1^2+q2^2+q3^2)^(1/2)/2)^2)/(q1^2+q2^2+q3^2)^2-(4*q1*q3^2*sin((q1^2+q2^2+q3^2)^(1/2)/2)^2)/(q1^2+q2^2+q3^2)^2+(2*q1^3*sin((q1^2+q2^2+q3^2)^(1/2)/2)*cos((q1^2+q2^2+q3^2)^(1/2)/2))/(q1^2+q2^2+q3^2)^(3/2)+(2*q1*q3^2*sin((q1^2+q2^2+q3^2)^(1/2)/2)*cos((q1^2+q2^2+q3^2)^(1/2)/2))/(q1^2+q2^2+q3^2)^(3/2))-Up33*(sin((q1^2+q2^2+q3^2)^(1/2))/(q1^2+q2^2+q3^2)^(1/2)-(q1^2*sin((q1^2+q2^2+q3^2)^(1/2)))/(q1^2+q2^2+q3^2)^(3/2)+(q1^2*cos((q1^2+q2^2+q3^2)^(1/2)))/(q1^2+q2^2+q3^2)+(4*q1*q2*q3*sin((q1^2+q2^2+q3^2)^(1/2)/2)^2)/(q1^2+q2^2+q3^2)^2-(2*q1*q2*q3*sin((q1^2+q2^2+q3^2)^(1/2)/2)*cos((q1^2+q2^2+q3^2)^(1/2)/2))/(q1^2+q2^2+q3^2)^(3/2))  // da, component 61
    da62 = Up23*((4*q1^2*q2*sin((q1^2+q2^2+q3^2)^(1/2)/2)^2)/(q1^2+q2^2+q3^2)^2+(4*q2*q3^2*sin((q1^2+q2^2+q3^2)^(1/2)/2)^2)/(q1^2+q2^2+q3^2)^2-(2*q1^2*q2*sin((q1^2+q2^2+q3^2)^(1/2)/2)*cos((q1^2+q2^2+q3^2)^(1/2)/2))/(q1^2+q2^2+q3^2)^(3/2)-(2*q2*q3^2*sin((q1^2+q2^2+q3^2)^(1/2)/2)*cos((q1^2+q2^2+q3^2)^(1/2)/2))/(q1^2+q2^2+q3^2)^(3/2))+Up13*((2*q1*sin((q1^2+q2^2+q3^2)^(1/2)/2)^2)/(q1^2+q2^2+q3^2)+(q2*q3*cos((q1^2+q2^2+q3^2)^(1/2)))/(q1^2+q2^2+q3^2)-(q2*q3*sin((q1^2+q2^2+q3^2)^(1/2)))/(q1^2+q2^2+q3^2)^(3/2)-(4*q1*q2^2*sin((q1^2+q2^2+q3^2)^(1/2)/2)^2)/(q1^2+q2^2+q3^2)^2+(2*q1*q2^2*sin((q1^2+q2^2+q3^2)^(1/2)/2)*cos((q1^2+q2^2+q3^2)^(1/2)/2))/(q1^2+q2^2+q3^2)^(3/2))+Up33*((2*q3*sin((q1^2+q2^2+q3^2)^(1/2)/2)^2)/(q1^2+q2^2+q3^2)-(q1*q2*cos((q1^2+q2^2+q3^2)^(1/2)))/(q1^2+q2^2+q3^2)+(q1*q2*sin((q1^2+q2^2+q3^2)^(1/2)))/(q1^2+q2^2+q3^2)^(3/2)-(4*q2^2*q3*sin((q1^2+q2^2+q3^2)^(1/2)/2)^2)/(q1^2+q2^2+q3^2)^2+(2*q2^2*q3*sin((q1^2+q2^2+q3^2)^(1/2)/2)*cos((q1^2+q2^2+q3^2)^(1/2)/2))/(q1^2+q2^2+q3^2)^(3/2))  // da, component 62
    da63 = Up13*(sin((q1^2+q2^2+q3^2)^(1/2))/(q1^2+q2^2+q3^2)^(1/2)-(q3^2*sin((q1^2+q2^2+q3^2)^(1/2)))/(q1^2+q2^2+q3^2)^(3/2)+(q3^2*cos((q1^2+q2^2+q3^2)^(1/2)))/(q1^2+q2^2+q3^2)-(4*q1*q2*q3*sin((q1^2+q2^2+q3^2)^(1/2)/2)^2)/(q1^2+q2^2+q3^2)^2+(2*q1*q2*q3*sin((q1^2+q2^2+q3^2)^(1/2)/2)*cos((q1^2+q2^2+q3^2)^(1/2)/2))/(q1^2+q2^2+q3^2)^(3/2))-Up23*((4*q3*sin((q1^2+q2^2+q3^2)^(1/2)/2)^2)/(q1^2+q2^2+q3^2)-(4*q3^3*sin((q1^2+q2^2+q3^2)^(1/2)/2)^2)/(q1^2+q2^2+q3^2)^2-(4*q1^2*q3*sin((q1^2+q2^2+q3^2)^(1/2)/2)^2)/(q1^2+q2^2+q3^2)^2+(2*q3^3*sin((q1^2+q2^2+q3^2)^(1/2)/2)*cos((q1^2+q2^2+q3^2)^(1/2)/2))/(q1^2+q2^2+q3^2)^(3/2)+(2*q1^2*q3*sin((q1^2+q2^2+q3^2)^(1/2)/2)*cos((q1^2+q2^2+q3^2)^(1/2)/2))/(q1^2+q2^2+q3^2)^(3/2))+Up33*((2*q2*sin((q1^2+q2^2+q3^2)^(1/2)/2)^2)/(q1^2+q2^2+q3^2)-(q1*q3*cos((q1^2+q2^2+q3^2)^(1/2)))/(q1^2+q2^2+q3^2)+(q1*q3*sin((q1^2+q2^2+q3^2)^(1/2)))/(q1^2+q2^2+q3^2)^(3/2)-(4*q2*q3^2*sin((q1^2+q2^2+q3^2)^(1/2)/2)^2)/(q1^2+q2^2+q3^2)^2+(2*q2*q3^2*sin((q1^2+q2^2+q3^2)^(1/2)/2)*cos((q1^2+q2^2+q3^2)^(1/2)/2))/(q1^2+q2^2+q3^2)^(3/2))  // da, component 63
    da64 = 0  // da, component 64
    da65 = 0  // da, component 65
    da66 = (2*q2*q3*sin((q1^2+q2^2+q3^2)^(1/2)/2)^2)/(q1^2+q2^2+q3^2)-(q1*sin((q1^2+q2^2+q3^2)^(1/2)))/(q1^2+q2^2+q3^2)^(1/2)  // da, component 66
    da67 = 0  // da, component 67
    da68 = (q3*sin((q1^2+q2^2+q3^2)^(1/2)))/(q1^2+q2^2+q3^2)^(1/2)+(2*q1*q2*sin((q1^2+q2^2+q3^2)^(1/2)/2)^2)/(q1^2+q2^2+q3^2)  // da, component 68
    da69 = 1-(2*q3^2*sin((q1^2+q2^2+q3^2)^(1/2)/2)^2)/(q1^2+q2^2+q3^2)-(2*q1^2*sin((q1^2+q2^2+q3^2)^(1/2)/2)^2)/(q1^2+q2^2+q3^2)  // da, component 69
    da71 = Up12*(sin((q1^2+q2^2+q3^2)^(1/2))/(q1^2+q2^2+q3^2)^(1/2)-(q1^2*sin((q1^2+q2^2+q3^2)^(1/2)))/(q1^2+q2^2+q3^2)^(3/2)+(q1^2*cos((q1^2+q2^2+q3^2)^(1/2)))/(q1^2+q2^2+q3^2)-(4*q1*q2*q3*sin((q1^2+q2^2+q3^2)^(1/2)/2)^2)/(q1^2+q2^2+q3^2)^2+(2*q1*q2*q3*sin((q1^2+q2^2+q3^2)^(1/2)/2)*cos((q1^2+q2^2+q3^2)^(1/2)/2))/(q1^2+q2^2+q3^2)^(3/2))-Up13*((4*q1*sin((q1^2+q2^2+q3^2)^(1/2)/2)^2)/(q1^2+q2^2+q3^2)-(4*q1^3*sin((q1^2+q2^2+q3^2)^(1/2)/2)^2)/(q1^2+q2^2+q3^2)^2-(4*q1*q2^2*sin((q1^2+q2^2+q3^2)^(1/2)/2)^2)/(q1^2+q2^2+q3^2)^2+(2*q1^3*sin((q1^2+q2^2+q3^2)^(1/2)/2)*cos((q1^2+q2^2+q3^2)^(1/2)/2))/(q1^2+q2^2+q3^2)^(3/2)+(2*q1*q2^2*sin((q1^2+q2^2+q3^2)^(1/2)/2)*cos((q1^2+q2^2+q3^2)^(1/2)/2))/(q1^2+q2^2+q3^2)^(3/2))+Up11*((2*q3*sin((q1^2+q2^2+q3^2)^(1/2)/2)^2)/(q1^2+q2^2+q3^2)-(q1*q2*cos((q1^2+q2^2+q3^2)^(1/2)))/(q1^2+q2^2+q3^2)+(q1*q2*sin((q1^2+q2^2+q3^2)^(1/2)))/(q1^2+q2^2+q3^2)^(3/2)-(4*q1^2*q3*sin((q1^2+q2^2+q3^2)^(1/2)/2)^2)/(q1^2+q2^2+q3^2)^2+(2*q1^2*q3*sin((q1^2+q2^2+q3^2)^(1/2)/2)*cos((q1^2+q2^2+q3^2)^(1/2)/2))/(q1^2+q2^2+q3^2)^(3/2))  // da, component 71
    da72 = Up12*((2*q3*sin((q1^2+q2^2+q3^2)^(1/2)/2)^2)/(q1^2+q2^2+q3^2)+(q1*q2*cos((q1^2+q2^2+q3^2)^(1/2)))/(q1^2+q2^2+q3^2)-(q1*q2*sin((q1^2+q2^2+q3^2)^(1/2)))/(q1^2+q2^2+q3^2)^(3/2)-(4*q2^2*q3*sin((q1^2+q2^2+q3^2)^(1/2)/2)^2)/(q1^2+q2^2+q3^2)^2+(2*q2^2*q3*sin((q1^2+q2^2+q3^2)^(1/2)/2)*cos((q1^2+q2^2+q3^2)^(1/2)/2))/(q1^2+q2^2+q3^2)^(3/2))-Up13*((4*q2*sin((q1^2+q2^2+q3^2)^(1/2)/2)^2)/(q1^2+q2^2+q3^2)-(4*q2^3*sin((q1^2+q2^2+q3^2)^(1/2)/2)^2)/(q1^2+q2^2+q3^2)^2-(4*q1^2*q2*sin((q1^2+q2^2+q3^2)^(1/2)/2)^2)/(q1^2+q2^2+q3^2)^2+(2*q2^3*sin((q1^2+q2^2+q3^2)^(1/2)/2)*cos((q1^2+q2^2+q3^2)^(1/2)/2))/(q1^2+q2^2+q3^2)^(3/2)+(2*q1^2*q2*sin((q1^2+q2^2+q3^2)^(1/2)/2)*cos((q1^2+q2^2+q3^2)^(1/2)/2))/(q1^2+q2^2+q3^2)^(3/2))-Up11*(sin((q1^2+q2^2+q3^2)^(1/2))/(q1^2+q2^2+q3^2)^(1/2)-(q2^2*sin((q1^2+q2^2+q3^2)^(1/2)))/(q1^2+q2^2+q3^2)^(3/2)+(q2^2*cos((q1^2+q2^2+q3^2)^(1/2)))/(q1^2+q2^2+q3^2)+(4*q1*q2*q3*sin((q1^2+q2^2+q3^2)^(1/2)/2)^2)/(q1^2+q2^2+q3^2)^2-(2*q1*q2*q3*sin((q1^2+q2^2+q3^2)^(1/2)/2)*cos((q1^2+q2^2+q3^2)^(1/2)/2))/(q1^2+q2^2+q3^2)^(3/2))  // da, component 72
    da73 = Up13*((4*q1^2*q3*sin((q1^2+q2^2+q3^2)^(1/2)/2)^2)/(q1^2+q2^2+q3^2)^2+(4*q2^2*q3*sin((q1^2+q2^2+q3^2)^(1/2)/2)^2)/(q1^2+q2^2+q3^2)^2-(2*q1^2*q3*sin((q1^2+q2^2+q3^2)^(1/2)/2)*cos((q1^2+q2^2+q3^2)^(1/2)/2))/(q1^2+q2^2+q3^2)^(3/2)-(2*q2^2*q3*sin((q1^2+q2^2+q3^2)^(1/2)/2)*cos((q1^2+q2^2+q3^2)^(1/2)/2))/(q1^2+q2^2+q3^2)^(3/2))+Up11*((2*q1*sin((q1^2+q2^2+q3^2)^(1/2)/2)^2)/(q1^2+q2^2+q3^2)-(q2*q3*cos((q1^2+q2^2+q3^2)^(1/2)))/(q1^2+q2^2+q3^2)+(q2*q3*sin((q1^2+q2^2+q3^2)^(1/2)))/(q1^2+q2^2+q3^2)^(3/2)-(4*q1*q3^2*sin((q1^2+q2^2+q3^2)^(1/2)/2)^2)/(q1^2+q2^2+q3^2)^2+(2*q1*q3^2*sin((q1^2+q2^2+q3^2)^(1/2)/2)*cos((q1^2+q2^2+q3^2)^(1/2)/2))/(q1^2+q2^2+q3^2)^(3/2))+Up12*((2*q2*sin((q1^2+q2^2+q3^2)^(1/2)/2)^2)/(q1^2+q2^2+q3^2)+(q1*q3*cos((q1^2+q2^2+q3^2)^(1/2)))/(q1^2+q2^2+q3^2)-(q1*q3*sin((q1^2+q2^2+q3^2)^(1/2)))/(q1^2+q2^2+q3^2)^(3/2)-(4*q2*q3^2*sin((q1^2+q2^2+q3^2)^(1/2)/2)^2)/(q1^2+q2^2+q3^2)^2+(2*q2*q3^2*sin((q1^2+q2^2+q3^2)^(1/2)/2)*cos((q1^2+q2^2+q3^2)^(1/2)/2))/(q1^2+q2^2+q3^2)^(3/2))  // da, component 73
    da74 = (2*q1*q3*sin((q1^2+q2^2+q3^2)^(1/2)/2)^2)/(q1^2+q2^2+q3^2)-(q2*sin((q1^2+q2^2+q3^2)^(1/2)))/(q1^2+q2^2+q3^2)^(1/2)  // da, component 74
    da75 = 0  // da, component 75
    da76 = 0  // da, component 76
    da77 = (q1*sin((q1^2+q2^2+q3^2)^(1/2)))/(q1^2+q2^2+q3^2)^(1/2)+(2*q2*q3*sin((q1^2+q2^2+q3^2)^(1/2)/2)^2)/(q1^2+q2^2+q3^2)  // da, component 77
    da78 = 1-(2*q2^2*sin((q1^2+q2^2+q3^2)^(1/2)/2)^2)/(q1^2+q2^2+q3^2)-(2*q1^2*sin((q1^2+q2^2+q3^2)^(1/2)/2)^2)/(q1^2+q2^2+q3^2)  // da, component 78
    da79 = 0  // da, component 79
    da81 = Up22*(sin((q1^2+q2^2+q3^2)^(1/2))/(q1^2+q2^2+q3^2)^(1/2)-(q1^2*sin((q1^2+q2^2+q3^2)^(1/2)))/(q1^2+q2^2+q3^2)^(3/2)+(q1^2*cos((q1^2+q2^2+q3^2)^(1/2)))/(q1^2+q2^2+q3^2)-(4*q1*q2*q3*sin((q1^2+q2^2+q3^2)^(1/2)/2)^2)/(q1^2+q2^2+q3^2)^2+(2*q1*q2*q3*sin((q1^2+q2^2+q3^2)^(1/2)/2)*cos((q1^2+q2^2+q3^2)^(1/2)/2))/(q1^2+q2^2+q3^2)^(3/2))-Up23*((4*q1*sin((q1^2+q2^2+q3^2)^(1/2)/2)^2)/(q1^2+q2^2+q3^2)-(4*q1^3*sin((q1^2+q2^2+q3^2)^(1/2)/2)^2)/(q1^2+q2^2+q3^2)^2-(4*q1*q2^2*sin((q1^2+q2^2+q3^2)^(1/2)/2)^2)/(q1^2+q2^2+q3^2)^2+(2*q1^3*sin((q1^2+q2^2+q3^2)^(1/2)/2)*cos((q1^2+q2^2+q3^2)^(1/2)/2))/(q1^2+q2^2+q3^2)^(3/2)+(2*q1*q2^2*sin((q1^2+q2^2+q3^2)^(1/2)/2)*cos((q1^2+q2^2+q3^2)^(1/2)/2))/(q1^2+q2^2+q3^2)^(3/2))+Up12*((2*q3*sin((q1^2+q2^2+q3^2)^(1/2)/2)^2)/(q1^2+q2^2+q3^2)-(q1*q2*cos((q1^2+q2^2+q3^2)^(1/2)))/(q1^2+q2^2+q3^2)+(q1*q2*sin((q1^2+q2^2+q3^2)^(1/2)))/(q1^2+q2^2+q3^2)^(3/2)-(4*q1^2*q3*sin((q1^2+q2^2+q3^2)^(1/2)/2)^2)/(q1^2+q2^2+q3^2)^2+(2*q1^2*q3*sin((q1^2+q2^2+q3^2)^(1/2)/2)*cos((q1^2+q2^2+q3^2)^(1/2)/2))/(q1^2+q2^2+q3^2)^(3/2))  // da, component 81
    da82 = Up22*((2*q3*sin((q1^2+q2^2+q3^2)^(1/2)/2)^2)/(q1^2+q2^2+q3^2)+(q1*q2*cos((q1^2+q2^2+q3^2)^(1/2)))/(q1^2+q2^2+q3^2)-(q1*q2*sin((q1^2+q2^2+q3^2)^(1/2)))/(q1^2+q2^2+q3^2)^(3/2)-(4*q2^2*q3*sin((q1^2+q2^2+q3^2)^(1/2)/2)^2)/(q1^2+q2^2+q3^2)^2+(2*q2^2*q3*sin((q1^2+q2^2+q3^2)^(1/2)/2)*cos((q1^2+q2^2+q3^2)^(1/2)/2))/(q1^2+q2^2+q3^2)^(3/2))-Up23*((4*q2*sin((q1^2+q2^2+q3^2)^(1/2)/2)^2)/(q1^2+q2^2+q3^2)-(4*q2^3*sin((q1^2+q2^2+q3^2)^(1/2)/2)^2)/(q1^2+q2^2+q3^2)^2-(4*q1^2*q2*sin((q1^2+q2^2+q3^2)^(1/2)/2)^2)/(q1^2+q2^2+q3^2)^2+(2*q2^3*sin((q1^2+q2^2+q3^2)^(1/2)/2)*cos((q1^2+q2^2+q3^2)^(1/2)/2))/(q1^2+q2^2+q3^2)^(3/2)+(2*q1^2*q2*sin((q1^2+q2^2+q3^2)^(1/2)/2)*cos((q1^2+q2^2+q3^2)^(1/2)/2))/(q1^2+q2^2+q3^2)^(3/2))-Up12*(sin((q1^2+q2^2+q3^2)^(1/2))/(q1^2+q2^2+q3^2)^(1/2)-(q2^2*sin((q1^2+q2^2+q3^2)^(1/2)))/(q1^2+q2^2+q3^2)^(3/2)+(q2^2*cos((q1^2+q2^2+q3^2)^(1/2)))/(q1^2+q2^2+q3^2)+(4*q1*q2*q3*sin((q1^2+q2^2+q3^2)^(1/2)/2)^2)/(q1^2+q2^2+q3^2)^2-(2*q1*q2*q3*sin((q1^2+q2^2+q3^2)^(1/2)/2)*cos((q1^2+q2^2+q3^2)^(1/2)/2))/(q1^2+q2^2+q3^2)^(3/2))  // da, component 82
    da83 = Up23*((4*q1^2*q3*sin((q1^2+q2^2+q3^2)^(1/2)/2)^2)/(q1^2+q2^2+q3^2)^2+(4*q2^2*q3*sin((q1^2+q2^2+q3^2)^(1/2)/2)^2)/(q1^2+q2^2+q3^2)^2-(2*q1^2*q3*sin((q1^2+q2^2+q3^2)^(1/2)/2)*cos((q1^2+q2^2+q3^2)^(1/2)/2))/(q1^2+q2^2+q3^2)^(3/2)-(2*q2^2*q3*sin((q1^2+q2^2+q3^2)^(1/2)/2)*cos((q1^2+q2^2+q3^2)^(1/2)/2))/(q1^2+q2^2+q3^2)^(3/2))+Up12*((2*q1*sin((q1^2+q2^2+q3^2)^(1/2)/2)^2)/(q1^2+q2^2+q3^2)-(q2*q3*cos((q1^2+q2^2+q3^2)^(1/2)))/(q1^2+q2^2+q3^2)+(q2*q3*sin((q1^2+q2^2+q3^2)^(1/2)))/(q1^2+q2^2+q3^2)^(3/2)-(4*q1*q3^2*sin((q1^2+q2^2+q3^2)^(1/2)/2)^2)/(q1^2+q2^2+q3^2)^2+(2*q1*q3^2*sin((q1^2+q2^2+q3^2)^(1/2)/2)*cos((q1^2+q2^2+q3^2)^(1/2)/2))/(q1^2+q2^2+q3^2)^(3/2))+Up22*((2*q2*sin((q1^2+q2^2+q3^2)^(1/2)/2)^2)/(q1^2+q2^2+q3^2)+(q1*q3*cos((q1^2+q2^2+q3^2)^(1/2)))/(q1^2+q2^2+q3^2)-(q1*q3*sin((q1^2+q2^2+q3^2)^(1/2)))/(q1^2+q2^2+q3^2)^(3/2)-(4*q2*q3^2*sin((q1^2+q2^2+q3^2)^(1/2)/2)^2)/(q1^2+q2^2+q3^2)^2+(2*q2*q3^2*sin((q1^2+q2^2+q3^2)^(1/2)/2)*cos((q1^2+q2^2+q3^2)^(1/2)/2))/(q1^2+q2^2+q3^2)^(3/2))  // da, component 83
    da84 = 0  // da, component 84
    da85 = (q1*sin((q1^2+q2^2+q3^2)^(1/2)))/(q1^2+q2^2+q3^2)^(1/2)+(2*q2*q3*sin((q1^2+q2^2+q3^2)^(1/2)/2)^2)/(q1^2+q2^2+q3^2)  // da, component 85
    da86 = 0  // da, component 86
    da87 = (2*q1*q3*sin((q1^2+q2^2+q3^2)^(1/2)/2)^2)/(q1^2+q2^2+q3^2)-(q2*sin((q1^2+q2^2+q3^2)^(1/2)))/(q1^2+q2^2+q3^2)^(1/2)  // da, component 87
    da88 = 0  // da, component 88
    da89 = 1-(2*q2^2*sin((q1^2+q2^2+q3^2)^(1/2)/2)^2)/(q1^2+q2^2+q3^2)-(2*q1^2*sin((q1^2+q2^2+q3^2)^(1/2)/2)^2)/(q1^2+q2^2+q3^2)  // da, component 89
    da91 = Up23*(sin((q1^2+q2^2+q3^2)^(1/2))/(q1^2+q2^2+q3^2)^(1/2)-(q1^2*sin((q1^2+q2^2+q3^2)^(1/2)))/(q1^2+q2^2+q3^2)^(3/2)+(q1^2*cos((q1^2+q2^2+q3^2)^(1/2)))/(q1^2+q2^2+q3^2)-(4*q1*q2*q3*sin((q1^2+q2^2+q3^2)^(1/2)/2)^2)/(q1^2+q2^2+q3^2)^2+(2*q1*q2*q3*sin((q1^2+q2^2+q3^2)^(1/2)/2)*cos((q1^2+q2^2+q3^2)^(1/2)/2))/(q1^2+q2^2+q3^2)^(3/2))-Up33*((4*q1*sin((q1^2+q2^2+q3^2)^(1/2)/2)^2)/(q1^2+q2^2+q3^2)-(4*q1^3*sin((q1^2+q2^2+q3^2)^(1/2)/2)^2)/(q1^2+q2^2+q3^2)^2-(4*q1*q2^2*sin((q1^2+q2^2+q3^2)^(1/2)/2)^2)/(q1^2+q2^2+q3^2)^2+(2*q1^3*sin((q1^2+q2^2+q3^2)^(1/2)/2)*cos((q1^2+q2^2+q3^2)^(1/2)/2))/(q1^2+q2^2+q3^2)^(3/2)+(2*q1*q2^2*sin((q1^2+q2^2+q3^2)^(1/2)/2)*cos((q1^2+q2^2+q3^2)^(1/2)/2))/(q1^2+q2^2+q3^2)^(3/2))+Up13*((2*q3*sin((q1^2+q2^2+q3^2)^(1/2)/2)^2)/(q1^2+q2^2+q3^2)-(q1*q2*cos((q1^2+q2^2+q3^2)^(1/2)))/(q1^2+q2^2+q3^2)+(q1*q2*sin((q1^2+q2^2+q3^2)^(1/2)))/(q1^2+q2^2+q3^2)^(3/2)-(4*q1^2*q3*sin((q1^2+q2^2+q3^2)^(1/2)/2)^2)/(q1^2+q2^2+q3^2)^2+(2*q1^2*q3*sin((q1^2+q2^2+q3^2)^(1/2)/2)*cos((q1^2+q2^2+q3^2)^(1/2)/2))/(q1^2+q2^2+q3^2)^(3/2))  // da, component 91
    da92 = Up23*((2*q3*sin((q1^2+q2^2+q3^2)^(1/2)/2)^2)/(q1^2+q2^2+q3^2)+(q1*q2*cos((q1^2+q2^2+q3^2)^(1/2)))/(q1^2+q2^2+q3^2)-(q1*q2*sin((q1^2+q2^2+q3^2)^(1/2)))/(q1^2+q2^2+q3^2)^(3/2)-(4*q2^2*q3*sin((q1^2+q2^2+q3^2)^(1/2)/2)^2)/(q1^2+q2^2+q3^2)^2+(2*q2^2*q3*sin((q1^2+q2^2+q3^2)^(1/2)/2)*cos((q1^2+q2^2+q3^2)^(1/2)/2))/(q1^2+q2^2+q3^2)^(3/2))-Up33*((4*q2*sin((q1^2+q2^2+q3^2)^(1/2)/2)^2)/(q1^2+q2^2+q3^2)-(4*q2^3*sin((q1^2+q2^2+q3^2)^(1/2)/2)^2)/(q1^2+q2^2+q3^2)^2-(4*q1^2*q2*sin((q1^2+q2^2+q3^2)^(1/2)/2)^2)/(q1^2+q2^2+q3^2)^2+(2*q2^3*sin((q1^2+q2^2+q3^2)^(1/2)/2)*cos((q1^2+q2^2+q3^2)^(1/2)/2))/(q1^2+q2^2+q3^2)^(3/2)+(2*q1^2*q2*sin((q1^2+q2^2+q3^2)^(1/2)/2)*cos((q1^2+q2^2+q3^2)^(1/2)/2))/(q1^2+q2^2+q3^2)^(3/2))-Up13*(sin((q1^2+q2^2+q3^2)^(1/2))/(q1^2+q2^2+q3^2)^(1/2)-(q2^2*sin((q1^2+q2^2+q3^2)^(1/2)))/(q1^2+q2^2+q3^2)^(3/2)+(q2^2*cos((q1^2+q2^2+q3^2)^(1/2)))/(q1^2+q2^2+q3^2)+(4*q1*q2*q3*sin((q1^2+q2^2+q3^2)^(1/2)/2)^2)/(q1^2+q2^2+q3^2)^2-(2*q1*q2*q3*sin((q1^2+q2^2+q3^2)^(1/2)/2)*cos((q1^2+q2^2+q3^2)^(1/2)/2))/(q1^2+q2^2+q3^2)^(3/2))  // da, component 92
    da93 = Up33*((4*q1^2*q3*sin((q1^2+q2^2+q3^2)^(1/2)/2)^2)/(q1^2+q2^2+q3^2)^2+(4*q2^2*q3*sin((q1^2+q2^2+q3^2)^(1/2)/2)^2)/(q1^2+q2^2+q3^2)^2-(2*q1^2*q3*sin((q1^2+q2^2+q3^2)^(1/2)/2)*cos((q1^2+q2^2+q3^2)^(1/2)/2))/(q1^2+q2^2+q3^2)^(3/2)-(2*q2^2*q3*sin((q1^2+q2^2+q3^2)^(1/2)/2)*cos((q1^2+q2^2+q3^2)^(1/2)/2))/(q1^2+q2^2+q3^2)^(3/2))+Up13*((2*q1*sin((q1^2+q2^2+q3^2)^(1/2)/2)^2)/(q1^2+q2^2+q3^2)-(q2*q3*cos((q1^2+q2^2+q3^2)^(1/2)))/(q1^2+q2^2+q3^2)+(q2*q3*sin((q1^2+q2^2+q3^2)^(1/2)))/(q1^2+q2^2+q3^2)^(3/2)-(4*q1*q3^2*sin((q1^2+q2^2+q3^2)^(1/2)/2)^2)/(q1^2+q2^2+q3^2)^2+(2*q1*q3^2*sin((q1^2+q2^2+q3^2)^(1/2)/2)*cos((q1^2+q2^2+q3^2)^(1/2)/2))/(q1^2+q2^2+q3^2)^(3/2))+Up23*((2*q2*sin((q1^2+q2^2+q3^2)^(1/2)/2)^2)/(q1^2+q2^2+q3^2)+(q1*q3*cos((q1^2+q2^2+q3^2)^(1/2)))/(q1^2+q2^2+q3^2)-(q1*q3*sin((q1^2+q2^2+q3^2)^(1/2)))/(q1^2+q2^2+q3^2)^(3/2)-(4*q2*q3^2*sin((q1^2+q2^2+q3^2)^(1/2)/2)^2)/(q1^2+q2^2+q3^2)^2+(2*q2*q3^2*sin((q1^2+q2^2+q3^2)^(1/2)/2)*cos((q1^2+q2^2+q3^2)^(1/2)/2))/(q1^2+q2^2+q3^2)^(3/2))  // da, component 93
    da94 = 0  // da, component 94
    da95 = 0  // da, component 95
    da96 = 1-(2*q2^2*sin((q1^2+q2^2+q3^2)^(1/2)/2)^2)/(q1^2+q2^2+q3^2)-(2*q1^2*sin((q1^2+q2^2+q3^2)^(1/2)/2)^2)/(q1^2+q2^2+q3^2)  // da, component 96
    da97 = 0  // da, component 97
    da98 = (2*q1*q3*sin((q1^2+q2^2+q3^2)^(1/2)/2)^2)/(q1^2+q2^2+q3^2)-(q2*sin((q1^2+q2^2+q3^2)^(1/2)))/(q1^2+q2^2+q3^2)^(1/2)  // da, component 98
    da99 = (q1*sin((q1^2+q2^2+q3^2)^(1/2)))/(q1^2+q2^2+q3^2)^(1/2)+(2*q2*q3*sin((q1^2+q2^2+q3^2)^(1/2)/2)^2)/(q1^2+q2^2+q3^2)  // da, component 99
    Jp = Fp11*Fp22*Fp33-Fp11*Fp23*Fp32-Fp12*Fp21*Fp33+Fp12*Fp23*Fp31+Fp13*Fp21*Fp32-Fp13*Fp22*Fp31  // determinant of Fp
    Gp11 = (Fp22*Fp33-Fp23*Fp32)/Jp  // inverse Fp, component 11
    Gp21 = (Fp23*Fp31-Fp21*Fp33)/Jp  // inverse Fp, component 21
    Gp31 = (Fp21*Fp32-Fp22*Fp31)/Jp  // inverse Fp, component 31
    Gp12 = (Fp13*Fp32-Fp12*Fp33)/Jp  // inverse Fp, component 12
    Gp22 = (Fp11*Fp33-Fp13*Fp31)/Jp  // inverse Fp, component 22
    Gp32 = (Fp12*Fp31-Fp11*Fp32)/Jp  // inverse Fp, component 32
    Gp13 = (Fp12*Fp23-Fp13*Fp22)/Jp  // inverse Fp, component 13
    Gp23 = (Fp13*Fp21-Fp11*Fp23)/Jp  // inverse Fp, component 23
    Gp33 = (Fp11*Fp22-Fp12*Fp21)/Jp  // inverse Fp, component 33
    F11 = u1x+1  // deformation gradient, component 11
    F12 = u1y+0  // deformation gradient, component 12
    F13 = u1z+0  // deformation gradient, component 13
    F21 = u2x+0  // deformation gradient, component 21
    F22 = u2y+1  // deformation gradient, component 22
    F23 = u2z+0  // deformation gradient, component 23
    F31 = u3x+0  // deformation gradient, component 31
    F32 = u3y+0  // deformation gradient, component 32
    F33 = u3z+1  // deformation gradient, component 33
    Fe11 = +F11*Gp11+F12*Gp21+F13*Gp31  // elastic distortion, component 11
    Fe12 = +F11*Gp12+F12*Gp22+F13*Gp32  // elastic distortion, component 12
    Fe13 = +F11*Gp13+F12*Gp23+F13*Gp33  // elastic distortion, component 13
    Fe21 = +F21*Gp11+F22*Gp21+F23*Gp31  // elastic distortion, component 21
    Fe22 = +F21*Gp12+F22*Gp22+F23*Gp32  // elastic distortion, component 22
    Fe23 = +F21*Gp13+F22*Gp23+F23*Gp33  // elastic distortion, component 23
    Fe31 = +F31*Gp11+F32*Gp21+F33*Gp31  // elastic distortion, component 31
    Fe32 = +F31*Gp12+F32*Gp22+F33*Gp32  // elastic distortion, component 32
    Fe33 = +F31*Gp13+F32*Gp23+F33*Gp33  // elastic distortion, component 33
    Ce11 = +Fe11*Fe11+Fe21*Fe21+Fe31*Fe31  // left CG stretch tensor, component 11
    Ce12 = +Fe11*Fe12+Fe21*Fe22+Fe31*Fe32  // left CG stretch tensor, component 12
    Ce13 = +Fe11*Fe13+Fe21*Fe23+Fe31*Fe33  // left CG stretch tensor, component 13
    Ce21 = +Fe12*Fe11+Fe22*Fe21+Fe32*Fe31  // left CG stretch tensor, component 21
    Ce22 = +Fe12*Fe12+Fe22*Fe22+Fe32*Fe32  // left CG stretch tensor, component 22
    Ce23 = +Fe12*Fe13+Fe22*Fe23+Fe32*Fe33  // left CG stretch tensor, component 23
    Ce31 = +Fe13*Fe11+Fe23*Fe21+Fe33*Fe31  // left CG stretch tensor, component 31
    Ce32 = +Fe13*Fe12+Fe23*Fe22+Fe33*Fe32  // left CG stretch tensor, component 32
    Ce33 = +Fe13*Fe13+Fe23*Fe23+Fe33*Fe33  // left CG stretch tensor, component 33
    Ee11 = 0.5*Ce11-0.5*1  // elastic strain, component 11
    Ee12 = 0.5*Ce12-0.5*0  // elastic strain, component 12
    Ee13 = 0.5*Ce13-0.5*0  // elastic strain, component 13
    Ee21 = 0.5*Ce21-0.5*0  // elastic strain, component 21
    Ee22 = 0.5*Ce22-0.5*1  // elastic strain, component 22
    Ee23 = 0.5*Ce23-0.5*0  // elastic strain, component 23
    Ee31 = 0.5*Ce31-0.5*0  // elastic strain, component 31
    Ee32 = 0.5*Ce32-0.5*0  // elastic strain, component 32
    Ee33 = 0.5*Ce33-0.5*1  // elastic strain, component 33
    P11 = +Fe11*W11*Gp11+Fe11*W12*Gp12+Fe11*W13*Gp13+Fe12*W21*Gp11+Fe12*W22*Gp12+Fe12*W23*Gp13+Fe13*W31*Gp11+Fe13*W32*Gp12+Fe13*W33*Gp13  // first Piola stress, component 11
    P12 = +Fe11*W11*Gp21+Fe11*W12*Gp22+Fe11*W13*Gp23+Fe12*W21*Gp21+Fe12*W22*Gp22+Fe12*W23*Gp23+Fe13*W31*Gp21+Fe13*W32*Gp22+Fe13*W33*Gp23  // first Piola stress, component 12
    P13 = +Fe11*W11*Gp31+Fe11*W12*Gp32+Fe11*W13*Gp33+Fe12*W21*Gp31+Fe12*W22*Gp32+Fe12*W23*Gp33+Fe13*W31*Gp31+Fe13*W32*Gp32+Fe13*W33*Gp33  // first Piola stress, component 13
    P21 = +Fe21*W11*Gp11+Fe21*W12*Gp12+Fe21*W13*Gp13+Fe22*W21*Gp11+Fe22*W22*Gp12+Fe22*W23*Gp13+Fe23*W31*Gp11+Fe23*W32*Gp12+Fe23*W33*Gp13  // first Piola stress, component 21
    P22 = +Fe21*W11*Gp21+Fe21*W12*Gp22+Fe21*W13*Gp23+Fe22*W21*Gp21+Fe22*W22*Gp22+Fe22*W23*Gp23+Fe23*W31*Gp21+Fe23*W32*Gp22+Fe23*W33*Gp23  // first Piola stress, component 22
    P23 = +Fe21*W11*Gp31+Fe21*W12*Gp32+Fe21*W13*Gp33+Fe22*W21*Gp31+Fe22*W22*Gp32+Fe22*W23*Gp33+Fe23*W31*Gp31+Fe23*W32*Gp32+Fe23*W33*Gp33  // first Piola stress, component 23
    P31 = +Fe31*W11*Gp11+Fe31*W12*Gp12+Fe31*W13*Gp13+Fe32*W21*Gp11+Fe32*W22*Gp12+Fe32*W23*Gp13+Fe33*W31*Gp11+Fe33*W32*Gp12+Fe33*W33*Gp13  // first Piola stress, component 31
    P32 = +Fe31*W11*Gp21+Fe31*W12*Gp22+Fe31*W13*Gp23+Fe32*W21*Gp21+Fe32*W22*Gp22+Fe32*W23*Gp23+Fe33*W31*Gp21+Fe33*W32*Gp22+Fe33*W33*Gp23  // first Piola stress, component 32
    P33 = +Fe31*W11*Gp31+Fe31*W12*Gp32+Fe31*W13*Gp33+Fe32*W21*Gp31+Fe32*W22*Gp32+Fe32*W23*Gp33+Fe33*W31*Gp31+Fe33*W32*Gp32+Fe33*W33*Gp33  // first Piola stress, component 33
    rss1 = +W11*n1_1*Ce11*s1_1+W11*n1_1*Ce12*s1_2+W11*n1_1*Ce13*s1_3+W12*n1_2*Ce11*s1_1+W12*n1_2*Ce12*s1_2+W12*n1_2*Ce13*s1_3+W13*n1_3*Ce11*s1_1+W13*n1_3*Ce12*s1_2+W13*n1_3*Ce13*s1_3+W21*n1_1*Ce21*s1_1+W21*n1_1*Ce22*s1_2+W21*n1_1*Ce23*s1_3+W22*n1_2*Ce21*s1_1+W22*n1_2*Ce22*s1_2+W22*n1_2*Ce23*s1_3+W23*n1_3*Ce21*s1_1+W23*n1_3*Ce22*s1_2+W23*n1_3*Ce23*s1_3+W31*n1_1*Ce31*s1_1+W31*n1_1*Ce32*s1_2+W31*n1_1*Ce33*s1_3+W32*n1_2*Ce31*s1_1+W32*n1_2*Ce32*s1_2+W32*n1_2*Ce33*s1_3+W33*n1_3*Ce31*s1_1+W33*n1_3*Ce32*s1_2+W33*n1_3*Ce33*s1_3  // Resolved shear stress 1
    rss2 = +W11*n2_1*Ce11*s2_1+W11*n2_1*Ce12*s2_2+W11*n2_1*Ce13*s2_3+W12*n2_2*Ce11*s2_1+W12*n2_2*Ce12*s2_2+W12*n2_2*Ce13*s2_3+W13*n2_3*Ce11*s2_1+W13*n2_3*Ce12*s2_2+W13*n2_3*Ce13*s2_3+W21*n2_1*Ce21*s2_1+W21*n2_1*Ce22*s2_2+W21*n2_1*Ce23*s2_3+W22*n2_2*Ce21*s2_1+W22*n2_2*Ce22*s2_2+W22*n2_2*Ce23*s2_3+W23*n2_3*Ce21*s2_1+W23*n2_3*Ce22*s2_2+W23*n2_3*Ce23*s2_3+W31*n2_1*Ce31*s2_1+W31*n2_1*Ce32*s2_2+W31*n2_1*Ce33*s2_3+W32*n2_2*Ce31*s2_1+W32*n2_2*Ce32*s2_2+W32*n2_2*Ce33*s2_3+W33*n2_3*Ce31*s2_1+W33*n2_3*Ce32*s2_2+W33*n2_3*Ce33*s2_3  // Resolved shear stress 2
    rss3 = +W11*n3_1*Ce11*s3_1+W11*n3_1*Ce12*s3_2+W11*n3_1*Ce13*s3_3+W12*n3_2*Ce11*s3_1+W12*n3_2*Ce12*s3_2+W12*n3_2*Ce13*s3_3+W13*n3_3*Ce11*s3_1+W13*n3_3*Ce12*s3_2+W13*n3_3*Ce13*s3_3+W21*n3_1*Ce21*s3_1+W21*n3_1*Ce22*s3_2+W21*n3_1*Ce23*s3_3+W22*n3_2*Ce21*s3_1+W22*n3_2*Ce22*s3_2+W22*n3_2*Ce23*s3_3+W23*n3_3*Ce21*s3_1+W23*n3_3*Ce22*s3_2+W23*n3_3*Ce23*s3_3+W31*n3_1*Ce31*s3_1+W31*n3_1*Ce32*s3_2+W31*n3_1*Ce33*s3_3+W32*n3_2*Ce31*s3_1+W32*n3_2*Ce32*s3_2+W32*n3_2*Ce33*s3_3+W33*n3_3*Ce31*s3_1+W33*n3_3*Ce32*s3_2+W33*n3_3*Ce33*s3_3  // Resolved shear stress 3
    rss4 = +W11*n4_1*Ce11*s4_1+W11*n4_1*Ce12*s4_2+W11*n4_1*Ce13*s4_3+W12*n4_2*Ce11*s4_1+W12*n4_2*Ce12*s4_2+W12*n4_2*Ce13*s4_3+W13*n4_3*Ce11*s4_1+W13*n4_3*Ce12*s4_2+W13*n4_3*Ce13*s4_3+W21*n4_1*Ce21*s4_1+W21*n4_1*Ce22*s4_2+W21*n4_1*Ce23*s4_3+W22*n4_2*Ce21*s4_1+W22*n4_2*Ce22*s4_2+W22*n4_2*Ce23*s4_3+W23*n4_3*Ce21*s4_1+W23*n4_3*Ce22*s4_2+W23*n4_3*Ce23*s4_3+W31*n4_1*Ce31*s4_1+W31*n4_1*Ce32*s4_2+W31*n4_1*Ce33*s4_3+W32*n4_2*Ce31*s4_1+W32*n4_2*Ce32*s4_2+W32*n4_2*Ce33*s4_3+W33*n4_3*Ce31*s4_1+W33*n4_3*Ce32*s4_2+W33*n4_3*Ce33*s4_3  // Resolved shear stress 4
    rss5 = +W11*n5_1*Ce11*s5_1+W11*n5_1*Ce12*s5_2+W11*n5_1*Ce13*s5_3+W12*n5_2*Ce11*s5_1+W12*n5_2*Ce12*s5_2+W12*n5_2*Ce13*s5_3+W13*n5_3*Ce11*s5_1+W13*n5_3*Ce12*s5_2+W13*n5_3*Ce13*s5_3+W21*n5_1*Ce21*s5_1+W21*n5_1*Ce22*s5_2+W21*n5_1*Ce23*s5_3+W22*n5_2*Ce21*s5_1+W22*n5_2*Ce22*s5_2+W22*n5_2*Ce23*s5_3+W23*n5_3*Ce21*s5_1+W23*n5_3*Ce22*s5_2+W23*n5_3*Ce23*s5_3+W31*n5_1*Ce31*s5_1+W31*n5_1*Ce32*s5_2+W31*n5_1*Ce33*s5_3+W32*n5_2*Ce31*s5_1+W32*n5_2*Ce32*s5_2+W32*n5_2*Ce33*s5_3+W33*n5_3*Ce31*s5_1+W33*n5_3*Ce32*s5_2+W33*n5_3*Ce33*s5_3  // Resolved shear stress 5
    rss6 = +W11*n6_1*Ce11*s6_1+W11*n6_1*Ce12*s6_2+W11*n6_1*Ce13*s6_3+W12*n6_2*Ce11*s6_1+W12*n6_2*Ce12*s6_2+W12*n6_2*Ce13*s6_3+W13*n6_3*Ce11*s6_1+W13*n6_3*Ce12*s6_2+W13*n6_3*Ce13*s6_3+W21*n6_1*Ce21*s6_1+W21*n6_1*Ce22*s6_2+W21*n6_1*Ce23*s6_3+W22*n6_2*Ce21*s6_1+W22*n6_2*Ce22*s6_2+W22*n6_2*Ce23*s6_3+W23*n6_3*Ce21*s6_1+W23*n6_3*Ce22*s6_2+W23*n6_3*Ce23*s6_3+W31*n6_1*Ce31*s6_1+W31*n6_1*Ce32*s6_2+W31*n6_1*Ce33*s6_3+W32*n6_2*Ce31*s6_1+W32*n6_2*Ce32*s6_2+W32*n6_2*Ce33*s6_3+W33*n6_3*Ce31*s6_1+W33*n6_3*Ce32*s6_2+W33*n6_3*Ce33*s6_3  // Resolved shear stress 6
    rss7 = +W11*n7_1*Ce11*s7_1+W11*n7_1*Ce12*s7_2+W11*n7_1*Ce13*s7_3+W12*n7_2*Ce11*s7_1+W12*n7_2*Ce12*s7_2+W12*n7_2*Ce13*s7_3+W13*n7_3*Ce11*s7_1+W13*n7_3*Ce12*s7_2+W13*n7_3*Ce13*s7_3+W21*n7_1*Ce21*s7_1+W21*n7_1*Ce22*s7_2+W21*n7_1*Ce23*s7_3+W22*n7_2*Ce21*s7_1+W22*n7_2*Ce22*s7_2+W22*n7_2*Ce23*s7_3+W23*n7_3*Ce21*s7_1+W23*n7_3*Ce22*s7_2+W23*n7_3*Ce23*s7_3+W31*n7_1*Ce31*s7_1+W31*n7_1*Ce32*s7_2+W31*n7_1*Ce33*s7_3+W32*n7_2*Ce31*s7_1+W32*n7_2*Ce32*s7_2+W32*n7_2*Ce33*s7_3+W33*n7_3*Ce31*s7_1+W33*n7_3*Ce32*s7_2+W33*n7_3*Ce33*s7_3  // Resolved shear stress 7
    rss8 = +W11*n8_1*Ce11*s8_1+W11*n8_1*Ce12*s8_2+W11*n8_1*Ce13*s8_3+W12*n8_2*Ce11*s8_1+W12*n8_2*Ce12*s8_2+W12*n8_2*Ce13*s8_3+W13*n8_3*Ce11*s8_1+W13*n8_3*Ce12*s8_2+W13*n8_3*Ce13*s8_3+W21*n8_1*Ce21*s8_1+W21*n8_1*Ce22*s8_2+W21*n8_1*Ce23*s8_3+W22*n8_2*Ce21*s8_1+W22*n8_2*Ce22*s8_2+W22*n8_2*Ce23*s8_3+W23*n8_3*Ce21*s8_1+W23*n8_3*Ce22*s8_2+W23*n8_3*Ce23*s8_3+W31*n8_1*Ce31*s8_1+W31*n8_1*Ce32*s8_2+W31*n8_1*Ce33*s8_3+W32*n8_2*Ce31*s8_1+W32*n8_2*Ce32*s8_2+W32*n8_2*Ce33*s8_3+W33*n8_3*Ce31*s8_1+W33*n8_3*Ce32*s8_2+W33*n8_3*Ce33*s8_3  // Resolved shear stress 8
    rss9 = +W11*n9_1*Ce11*s9_1+W11*n9_1*Ce12*s9_2+W11*n9_1*Ce13*s9_3+W12*n9_2*Ce11*s9_1+W12*n9_2*Ce12*s9_2+W12*n9_2*Ce13*s9_3+W13*n9_3*Ce11*s9_1+W13*n9_3*Ce12*s9_2+W13*n9_3*Ce13*s9_3+W21*n9_1*Ce21*s9_1+W21*n9_1*Ce22*s9_2+W21*n9_1*Ce23*s9_3+W22*n9_2*Ce21*s9_1+W22*n9_2*Ce22*s9_2+W22*n9_2*Ce23*s9_3+W23*n9_3*Ce21*s9_1+W23*n9_3*Ce22*s9_2+W23*n9_3*Ce23*s9_3+W31*n9_1*Ce31*s9_1+W31*n9_1*Ce32*s9_2+W31*n9_1*Ce33*s9_3+W32*n9_2*Ce31*s9_1+W32*n9_2*Ce32*s9_2+W32*n9_2*Ce33*s9_3+W33*n9_3*Ce31*s9_1+W33*n9_3*Ce32*s9_2+W33*n9_3*Ce33*s9_3  // Resolved shear stress 9
    rss10 = +W11*n10_1*Ce11*s10_1+W11*n10_1*Ce12*s10_2+W11*n10_1*Ce13*s10_3+W12*n10_2*Ce11*s10_1+W12*n10_2*Ce12*s10_2+W12*n10_2*Ce13*s10_3+W13*n10_3*Ce11*s10_1+W13*n10_3*Ce12*s10_2+W13*n10_3*Ce13*s10_3+W21*n10_1*Ce21*s10_1+W21*n10_1*Ce22*s10_2+W21*n10_1*Ce23*s10_3+W22*n10_2*Ce21*s10_1+W22*n10_2*Ce22*s10_2+W22*n10_2*Ce23*s10_3+W23*n10_3*Ce21*s10_1+W23*n10_3*Ce22*s10_2+W23*n10_3*Ce23*s10_3+W31*n10_1*Ce31*s10_1+W31*n10_1*Ce32*s10_2+W31*n10_1*Ce33*s10_3+W32*n10_2*Ce31*s10_1+W32*n10_2*Ce32*s10_2+W32*n10_2*Ce33*s10_3+W33*n10_3*Ce31*s10_1+W33*n10_3*Ce32*s10_2+W33*n10_3*Ce33*s10_3  // Resolved shear stress 10
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    v1 = sign(rss1)*v0*(abs(rss1)/g)^m  // slip rate
    v2 = sign(rss2)*v0*(abs(rss2)/g)^m  // slip rate
    v3 = sign(rss3)*v0*(abs(rss3)/g)^m  // slip rate
    v4 = sign(rss4)*v0*(abs(rss4)/g)^m  // slip rate
    v5 = sign(rss5)*v0*(abs(rss5)/g)^m  // slip rate
    v6 = sign(rss6)*v0*(abs(rss6)/g)^m  // slip rate
    v7 = sign(rss7)*v0*(abs(rss7)/g)^m  // slip rate
    v8 = sign(rss8)*v0*(abs(rss8)/g)^m  // slip rate
    v9 = sign(rss9)*v0*(abs(rss9)/g)^m  // slip rate
    v10 = sign(rss10)*v0*(abs(rss10)/g)^m  // slip rate
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    g = g0+b*c44*sqrt(hn*rhon)  // yield stress
    rhon = rho0*h  // dislocation density
    v = 1e-10[1/s]++abs(v1)+abs(v2)+abs(v3)+abs(v4)+abs(v5)+abs(v6)+abs(v7)+abs(v8)+abs(v9)+abs(v10)+abs(v11)+abs(v12)+abs(v13)+abs(v14)+abs(v15)+abs(v16)+abs(v17)+abs(v18)+abs(v19)+abs(v20)+abs(v21)+abs(v22)+abs(v23)+abs(v24)+abs(v25)+abs(v26)+abs(v27)+abs(v28)+abs(v29)+abs(v30)+abs(v31)+abs(v32)+abs(v33)+abs(v34)+abs(v35)+abs(v36)+abs(v37)+abs(v38)+abs(v39)+abs(v40)+abs(v41)+abs(v42)+abs(v43)+abs(v44)+abs(v45)+abs(v46)+abs(v47)+abs(v48)  // total slip rate
    doth = v*k1*sqrt(h)-k2*h  // rate of change in dislocation density
    k2 = k20*vk0^(1/n)*v^((n-1)/n)  // dislocation annihilation
    Lp11 = +v1*s1_1*n1_1+v2*s2_1*n2_1+v3*s3_1*n3_1+v4*s4_1*n4_1+v5*s5_1*n5_1+v6*s6_1*n6_1+v7*s7_1*n7_1+v8*s8_1*n8_1+v9*s9_1*n9_1+v10*s10_1*n10_1+v11*s11_1*n11_1+v12*s12_1*n12_1+v13*s13_1*n13_1+v14*s14_1*n14_1+v15*s15_1*n15_1+v16*s16_1*n16_1+v17*s17_1*n17_1+v18*s18_1*n18_1+v19*s19_1*n19_1+v20*s20_1*n20_1+v21*s21_1*n21_1+v22*s22_1*n22_1+v23*s23_1*n23_1+v24*s24_1*n24_1+v25*s25_1*n25_1+v26*s26_1*n26_1+v27*s27_1*n27_1+v28*s28_1*n28_1+v29*s29_1*n29_1+v30*s30_1*n30_1+v31*s31_1*n31_1+v32*s32_1*n32_1+v33*s33_1*n33_1+v34*s34_1*n34_1+v35*s35_1*n35_1+v36*s36_1*n36_1+v37*s37_1*n37_1+v38*s38_1*n38_1+v39*s39_1*n39_1+v40*s40_1*n40_1+v41*s41_1*n41_1+v42*s42_1*n42_1+v43*s43_1*n43_1+v44*s44_1*n44_1+v45*s45_1*n45_1+v46*s46_1*n46_1+v47*s47_1*n47_1+v48*s48_1*n48_1  // Lp, component 11
    Lp12 = +v1*s1_1*n1_2+v2*s2_1*n2_2+v3*s3_1*n3_2+v4*s4_1*n4_2+v5*s5_1*n5_2+v6*s6_1*n6_2+v7*s7_1*n7_2+v8*s8_1*n8_2+v9*s9_1*n9_2+v10*s10_1*n10_2+v11*s11_1*n11_2+v12*s12_1*n12_2+v13*s13_1*n13_2+v14*s14_1*n14_2+v15*s15_1*n15_2+v16*s16_1*n16_2+v17*s17_1*n17_2+v18*s18_1*n18_2+v19*s19_1*n19_2+v20*s20_1*n20_2+v21*s21_1*n21_2+v22*s22_1*n22_2+v23*s23_1*n23_2+v24*s24_1*n24_2+v25*s25_1*n25_2+v26*s26_1*n26_2+v27*s27_1*n27_2+v28*s28_1*n28_2+v29*s29_1*n29_2+v30*s30_1*n30_2+v31*s31_1*n31_2+v32*s32_1*n32_2+v33*s33_1*n33_2+v34*s34_1*n34_2+v35*s35_1*n35_2+v36*s36_1*n36_2+v37*s37_1*n37_2+v38*s38_1*n38_2+v39*s39_1*n39_2+v40*s40_1*n40_2+v41*s41_1*n41_2+v42*s42_1*n42_2+v43*s43_1*n43_2+v44*s44_1*n44_2+v45*s45_1*n45_2+v46*s46_1*n46_2+v47*s47_1*n47_2+v48*s48_1*n48_2  // Lp, component 12
    Lp13 = +v1*s1_1*n1_3+v2*s2_1*n2_3+v3*s3_1*n3_3+v4*s4_1*n4_3+v5*s5_1*n5_3+v6*s6_1*n6_3+v7*s7_1*n7_3+v8*s8_1*n8_3+v9*s9_1*n9_3+v10*s10_1*n10_3+v11*s11_1*n11_3+v12*s12_1*n12_3+v13*s13_1*n13_3+v14*s14_1*n14_3+v15*s15_1*n15_3+v16*s16_1*n16_3+v17*s17_1*n17_3+v18*s18_1*n18_3+v19*s19_1*n19_3+v20*s20_1*n20_3+v21*s21_1*n21_3+v22*s22_1*n22_3+v23*s23_1*n23_3+v24*s24_1*n24_3+v25*s25_1*n25_3+v26*s26_1*n26_3+v27*s27_1*n27_3+v28*s28_1*n28_3+v29*s29_1*n29_3+v30*s30_1*n30_3+v31*s31_1*n31_3+v32*s32_1*n32_3+v33*s33_1*n33_3+v34*s34_1*n34_3+v35*s35_1*n35_3+v36*s36_1*n36_3+v37*s37_1*n37_3+v38*s38_1*n38_3+v39*s39_1*n39_3+v40*s40_1*n40_3+v41*s41_1*n41_3+v42*s42_1*n42_3+v43*s43_1*n43_3+v44*s44_1*n44_3+v45*s45_1*n45_3+v46*s46_1*n46_3+v47*s47_1*n47_3+v48*s48_1*n48_3  // Lp, component 13
    Lp21 = +v1*s1_2*n1_1+v2*s2_2*n2_1+v3*s3_2*n3_1+v4*s4_2*n4_1+v5*s5_2*n5_1+v6*s6_2*n6_1+v7*s7_2*n7_1+v8*s8_2*n8_1+v9*s9_2*n9_1+v10*s10_2*n10_1+v11*s11_2*n11_1+v12*s12_2*n12_1+v13*s13_2*n13_1+v14*s14_2*n14_1+v15*s15_2*n15_1+v16*s16_2*n16_1+v17*s17_2*n17_1+v18*s18_2*n18_1+v19*s19_2*n19_1+v20*s20_2*n20_1+v21*s21_2*n21_1+v22*s22_2*n22_1+v23*s23_2*n23_1+v24*s24_2*n24_1+v25*s25_2*n25_1+v26*s26_2*n26_1+v27*s27_2*n27_1+v28*s28_2*n28_1+v29*s29_2*n29_1+v30*s30_2*n30_1+v31*s31_2*n31_1+v32*s32_2*n32_1+v33*s33_2*n33_1+v34*s34_2*n34_1+v35*s35_2*n35_1+v36*s36_2*n36_1+v37*s37_2*n37_1+v38*s38_2*n38_1+v39*s39_2*n39_1+v40*s40_2*n40_1+v41*s41_2*n41_1+v42*s42_2*n42_1+v43*s43_2*n43_1+v44*s44_2*n44_1+v45*s45_2*n45_1+v46*s46_2*n46_1+v47*s47_2*n47_1+v48*s48_2*n48_1  // Lp, component 21
    Lp22 = +v1*s1_2*n1_2+v2*s2_2*n2_2+v3*s3_2*n3_2+v4*s4_2*n4_2+v5*s5_2*n5_2+v6*s6_2*n6_2+v7*s7_2*n7_2+v8*s8_2*n8_2+v9*s9_2*n9_2+v10*s10_2*n10_2+v11*s11_2*n11_2+v12*s12_2*n12_2+v13*s13_2*n13_2+v14*s14_2*n14_2+v15*s15_2*n15_2+v16*s16_2*n16_2+v17*s17_2*n17_2+v18*s18_2*n18_2+v19*s19_2*n19_2+v20*s20_2*n20_2+v21*s21_2*n21_2+v22*s22_2*n22_2+v23*s23_2*n23_2+v24*s24_2*n24_2+v25*s25_2*n25_2+v26*s26_2*n26_2+v27*s27_2*n27_2+v28*s28_2*n28_2+v29*s29_2*n29_2+v30*s30_2*n30_2+v31*s31_2*n31_2+v32*s32_2*n32_2+v33*s33_2*n33_2+v34*s34_2*n34_2+v35*s35_2*n35_2+v36*s36_2*n36_2+v37*s37_2*n37_2+v38*s38_2*n38_2+v39*s39_2*n39_2+v40*s40_2*n40_2+v41*s41_2*n41_2+v42*s42_2*n42_2+v43*s43_2*n43_2+v44*s44_2*n44_2+v45*s45_2*n45_2+v46*s46_2*n46_2+v47*s47_2*n47_2+v48*s48_2*n48_2  // Lp, component 22
    Lp23 = +v1*s1_2*n1_3+v2*s2_2*n2_3+v3*s3_2*n3_3+v4*s4_2*n4_3+v5*s5_2*n5_3+v6*s6_2*n6_3+v7*s7_2*n7_3+v8*s8_2*n8_3+v9*s9_2*n9_3+v10*s10_2*n10_3+v11*s11_2*n11_3+v12*s12_2*n12_3+v13*s13_2*n13_3+v14*s14_2*n14_3+v15*s15_2*n15_3+v16*s16_2*n16_3+v17*s17_2*n17_3+v18*s18_2*n18_3+v19*s19_2*n19_3+v20*s20_2*n20_3+v21*s21_2*n21_3+v22*s22_2*n22_3+v23*s23_2*n23_3+v24*s24_2*n24_3+v25*s25_2*n25_3+v26*s26_2*n26_3+v27*s27_2*n27_3+v28*s28_2*n28_3+v29*s29_2*n29_3+v30*s30_2*n30_3+v31*s31_2*n31_3+v32*s32_2*n32_3+v33*s33_2*n33_3+v34*s34_2*n34_3+v35*s35_2*n35_3+v36*s36_2*n36_3+v37*s37_2*n37_3+v38*s38_2*n38_3+v39*s39_2*n39_3+v40*s40_2*n40_3+v41*s41_2*n41_3+v42*s42_2*n42_3+v43*s43_2*n43_3+v44*s44_2*n44_3+v45*s45_2*n45_3+v46*s46_2*n46_3+v47*s47_2*n47_3+v48*s48_2*n48_3  // Lp, component 23
    Lp31 = +v1*s1_3*n1_1+v2*s2_3*n2_1+v3*s3_3*n3_1+v4*s4_3*n4_1+v5*s5_3*n5_1+v6*s6_3*n6_1+v7*s7_3*n7_1+v8*s8_3*n8_1+v9*s9_3*n9_1+v10*s10_3*n10_1+v11*s11_3*n11_1+v12*s12_3*n12_1+v13*s13_3*n13_1+v14*s14_3*n14_1+v15*s15_3*n15_1+v16*s16_3*n16_1+v17*s17_3*n17_1+v18*s18_3*n18_1+v19*s19_3*n19_1+v20*s20_3*n20_1+v21*s21_3*n21_1+v22*s22_3*n22_1+v23*s23_3*n23_1+v24*s24_3*n24_1+v25*s25_3*n25_1+v26*s26_3*n26_1+v27*s27_3*n27_1+v28*s28_3*n28_1+v29*s29_3*n29_1+v30*s30_3*n30_1+v31*s31_3*n31_1+v32*s32_3*n32_1+v33*s33_3*n33_1+v34*s34_3*n34_1+v35*s35_3*n35_1+v36*s36_3*n36_1+v37*s37_3*n37_1+v38*s38_3*n38_1+v39*s39_3*n39_1+v40*s40_3*n40_1+v41*s41_3*n41_1+v42*s42_3*n42_1+v43*s43_3*n43_1+v44*s44_3*n44_1+v45*s45_3*n45_1+v46*s46_3*n46_1+v47*s47_3*n47_1+v48*s48_3*n48_1  // Lp, component 31
    Lp32 = +v1*s1_3*n1_2+v2*s2_3*n2_2+v3*s3_3*n3_2+v4*s4_3*n4_2+v5*s5_3*n5_2+v6*s6_3*n6_2+v7*s7_3*n7_2+v8*s8_3*n8_2+v9*s9_3*n9_2+v10*s10_3*n10_2+v11*s11_3*n11_2+v12*s12_3*n12_2+v13*s13_3*n13_2+v14*s14_3*n14_2+v15*s15_3*n15_2+v16*s16_3*n16_2+v17*s17_3*n17_2+v18*s18_3*n18_2+v19*s19_3*n19_2+v20*s20_3*n20_2+v21*s21_3*n21_2+v22*s22_3*n22_2+v23*s23_3*n23_2+v24*s24_3*n24_2+v25*s25_3*n25_2+v26*s26_3*n26_2+v27*s27_3*n27_2+v28*s28_3*n28_2+v29*s29_3*n29_2+v30*s30_3*n30_2+v31*s31_3*n31_2+v32*s32_3*n32_2+v33*s33_3*n33_2+v34*s34_3*n34_2+v35*s35_3*n35_2+v36*s36_3*n36_2+v37*s37_3*n37_2+v38*s38_3*n38_2+v39*s39_3*n39_2+v40*s40_3*n40_2+v41*s41_3*n41_2+v42*s42_3*n42_2+v43*s43_3*n43_2+v44*s44_3*n44_2+v45*s45_3*n45_2+v46*s46_3*n46_2+v47*s47_3*n47_2+v48*s48_3*n48_2  // Lp, component 32
    Lp33 = +v1*s1_3*n1_3+v2*s2_3*n2_3+v3*s3_3*n3_3+v4*s4_3*n4_3+v5*s5_3*n5_3+v6*s6_3*n6_3+v7*s7_3*n7_3+v8*s8_3*n8_3+v9*s9_3*n9_3+v10*s10_3*n10_3+v11*s11_3*n11_3+v12*s12_3*n12_3+v13*s13_3*n13_3+v14*s14_3*n14_3+v15*s15_3*n15_3+v16*s16_3*n16_3+v17*s17_3*n17_3+v18*s18_3*n18_3+v19*s19_3*n19_3+v20*s20_3*n20_3+v21*s21_3*n21_3+v22*s22_3*n22_3+v23*s23_3*n23_3+v24*s24_3*n24_3+v25*s25_3*n25_3+v26*s26_3*n26_3+v27*s27_3*n27_3+v28*s28_3*n28_3+v29*s29_3*n29_3+v30*s30_3*n30_3+v31*s31_3*n31_3+v32*s32_3*n32_3+v33*s33_3*n33_3+v34*s34_3*n34_3+v35*s35_3*n35_3+v36*s36_3*n36_3+v37*s37_3*n37_3+v38*s38_3*n38_3+v39*s39_3*n39_3+v40*s40_3*n40_3+v41*s41_3*n41_3+v42*s42_3*n42_3+v43*s43_3*n43_3+v44*s44_3*n44_3+v45*s45_3*n45_3+v46*s46_3*n46_3+v47*s47_3*n47_3+v48*s48_3*n48_3  // Lp, component 33
    LpFp11 = +Lp11*Fp11+Lp12*Fp21+Lp13*Fp31  // LpFp, component 11
    LpFp12 = +Lp11*Fp12+Lp12*Fp22+Lp13*Fp32  // LpFp, component 12
    LpFp13 = +Lp11*Fp13+Lp12*Fp23+Lp13*Fp33  // LpFp, component 13
    LpFp21 = +Lp21*Fp11+Lp22*Fp21+Lp23*Fp31  // LpFp, component 21
    LpFp22 = +Lp21*Fp12+Lp22*Fp22+Lp23*Fp32  // LpFp, component 22
    LpFp23 = +Lp21*Fp13+Lp22*Fp23+Lp23*Fp33  // LpFp, component 23
    LpFp31 = +Lp31*Fp11+Lp32*Fp21+Lp33*Fp31  // LpFp, component 31
    LpFp32 = +Lp31*Fp12+Lp32*Fp22+Lp33*Fp32  // LpFp, component 32
    LpFp33 = +Lp31*Fp13+Lp32*Fp23+Lp33*Fp33  // LpFp, component 33
    G11 = (+0*d(Fp11,x)*Fp11+0*d(Fp12,x)*Fp11+0*d(Fp13,x)*Fp11+0*d(Fp11,y)*Fp11+0*d(Fp12,y)*Fp11+1*d(Fp13,y)*Fp11+0*d(Fp11,x)*Fp12+0*d(Fp12,x)*Fp12+-1*d(Fp13,x)*Fp12+0*d(Fp11,y)*Fp12+0*d(Fp12,y)*Fp12+0*d(Fp13,y)*Fp12+0*d(Fp11,x)*Fp13+1*d(Fp12,x)*Fp13+0*d(Fp13,x)*Fp13+-1*d(Fp11,y)*Fp13+0*d(Fp12,y)*Fp13+0*d(Fp13,y)*Fp13)/Jp  // G, component 11
    G12 = (+0*d(Fp21,x)*Fp11+0*d(Fp22,x)*Fp11+0*d(Fp23,x)*Fp11+0*d(Fp21,y)*Fp11+0*d(Fp22,y)*Fp11+1*d(Fp23,y)*Fp11+0*d(Fp21,x)*Fp12+0*d(Fp22,x)*Fp12+-1*d(Fp23,x)*Fp12+0*d(Fp21,y)*Fp12+0*d(Fp22,y)*Fp12+0*d(Fp23,y)*Fp12+0*d(Fp21,x)*Fp13+1*d(Fp22,x)*Fp13+0*d(Fp23,x)*Fp13+-1*d(Fp21,y)*Fp13+0*d(Fp22,y)*Fp13+0*d(Fp23,y)*Fp13)/Jp  // G, component 12
    G13 = (+0*d(Fp31,x)*Fp11+0*d(Fp32,x)*Fp11+0*d(Fp33,x)*Fp11+0*d(Fp31,y)*Fp11+0*d(Fp32,y)*Fp11+1*d(Fp33,y)*Fp11+0*d(Fp31,x)*Fp12+0*d(Fp32,x)*Fp12+-1*d(Fp33,x)*Fp12+0*d(Fp31,y)*Fp12+0*d(Fp32,y)*Fp12+0*d(Fp33,y)*Fp12+0*d(Fp31,x)*Fp13+1*d(Fp32,x)*Fp13+0*d(Fp33,x)*Fp13+-1*d(Fp31,y)*Fp13+0*d(Fp32,y)*Fp13+0*d(Fp33,y)*Fp13)/Jp  // G, component 13
    G21 = (+0*d(Fp11,x)*Fp21+0*d(Fp12,x)*Fp21+0*d(Fp13,x)*Fp21+0*d(Fp11,y)*Fp21+0*d(Fp12,y)*Fp21+1*d(Fp13,y)*Fp21+0*d(Fp11,x)*Fp22+0*d(Fp12,x)*Fp22+-1*d(Fp13,x)*Fp22+0*d(Fp11,y)*Fp22+0*d(Fp12,y)*Fp22+0*d(Fp13,y)*Fp22+0*d(Fp11,x)*Fp23+1*d(Fp12,x)*Fp23+0*d(Fp13,x)*Fp23+-1*d(Fp11,y)*Fp23+0*d(Fp12,y)*Fp23+0*d(Fp13,y)*Fp23)/Jp  // G, component 21
    G22 = (+0*d(Fp21,x)*Fp21+0*d(Fp22,x)*Fp21+0*d(Fp23,x)*Fp21+0*d(Fp21,y)*Fp21+0*d(Fp22,y)*Fp21+1*d(Fp23,y)*Fp21+0*d(Fp21,x)*Fp22+0*d(Fp22,x)*Fp22+-1*d(Fp23,x)*Fp22+0*d(Fp21,y)*Fp22+0*d(Fp22,y)*Fp22+0*d(Fp23,y)*Fp22+0*d(Fp21,x)*Fp23+1*d(Fp22,x)*Fp23+0*d(Fp23,x)*Fp23+-1*d(Fp21,y)*Fp23+0*d(Fp22,y)*Fp23+0*d(Fp23,y)*Fp23)/Jp  // G, component 22
    G23 = (+0*d(Fp31,x)*Fp21+0*d(Fp32,x)*Fp21+0*d(Fp33,x)*Fp21+0*d(Fp31,y)*Fp21+0*d(Fp32,y)*Fp21+1*d(Fp33,y)*Fp21+0*d(Fp31,x)*Fp22+0*d(Fp32,x)*Fp22+-1*d(Fp33,x)*Fp22+0*d(Fp31,y)*Fp22+0*d(Fp32,y)*Fp22+0*d(Fp33,y)*Fp22+0*d(Fp31,x)*Fp23+1*d(Fp32,x)*Fp23+0*d(Fp33,x)*Fp23+-1*d(Fp31,y)*Fp23+0*d(Fp32,y)*Fp23+0*d(Fp33,y)*Fp23)/Jp  // G, component 23
    G31 = (+0*d(Fp11,x)*Fp31+0*d(Fp12,x)*Fp31+0*d(Fp13,x)*Fp31+0*d(Fp11,y)*Fp31+0*d(Fp12,y)*Fp31+1*d(Fp13,y)*Fp31+0*d(Fp11,x)*Fp32+0*d(Fp12,x)*Fp32+-1*d(Fp13,x)*Fp32+0*d(Fp11,y)*Fp32+0*d(Fp12,y)*Fp32+0*d(Fp13,y)*Fp32+0*d(Fp11,x)*Fp33+1*d(Fp12,x)*Fp33+0*d(Fp13,x)*Fp33+-1*d(Fp11,y)*Fp33+0*d(Fp12,y)*Fp33+0*d(Fp13,y)*Fp33)/Jp  // G, component 31
    G32 = (+0*d(Fp21,x)*Fp31+0*d(Fp22,x)*Fp31+0*d(Fp23,x)*Fp31+0*d(Fp21,y)*Fp31+0*d(Fp22,y)*Fp31+1*d(Fp23,y)*Fp31+0*d(Fp21,x)*Fp32+0*d(Fp22,x)*Fp32+-1*d(Fp23,x)*Fp32+0*d(Fp21,y)*Fp32+0*d(Fp22,y)*Fp32+0*d(Fp23,y)*Fp32+0*d(Fp21,x)*Fp33+1*d(Fp22,x)*Fp33+0*d(Fp23,x)*Fp33+-1*d(Fp21,y)*Fp33+0*d(Fp22,y)*Fp33+0*d(Fp23,y)*Fp33)/Jp  // G, component 32
    G33 = (+0*d(Fp31,x)*Fp31+0*d(Fp32,x)*Fp31+0*d(Fp33,x)*Fp31+0*d(Fp31,y)*Fp31+0*d(Fp32,y)*Fp31+1*d(Fp33,y)*Fp31+0*d(Fp31,x)*Fp32+0*d(Fp32,x)*Fp32+-1*d(Fp33,x)*Fp32+0*d(Fp31,y)*Fp32+0*d(Fp32,y)*Fp32+0*d(Fp33,y)*Fp32+0*d(Fp31,x)*Fp33+1*d(Fp32,x)*Fp33+0*d(Fp33,x)*Fp33+-1*d(Fp31,y)*Fp33+0*d(Fp32,y)*Fp33+0*d(Fp33,y)*Fp33)/Jp  // G, component 33
    tc = 48*aveop1(P11)/(g*aveop1(abs(v1/v0)^0.05+abs(v2/v0)^0.05+abs(v3/v0)^0.05+abs(v4/v0)^0.05+abs(v5/v0)^0.05+abs(v6/v0)^0.05+abs(v7/v0)^0.05+abs(v8/v0)^0.05+abs(v9/v0)^0.05+abs(v10/v0)^0.05+abs(v11/v0)^0.05+abs(v12/v0)^0.05+abs(v13/v0)^0.05+abs(v14/v0)^0.05+abs(v15/v0)^0.05+abs(v16/v0)^0.05+abs(v17/v0)^0.05+abs(v18/v0)^0.05+abs(v19/v0)^0.05+abs(v20/v0)^0.05+abs(v21/v0)^0.05+abs(v22/v0)^0.05+abs(v23/v0)^0.05+abs(v24/v0)^0.05+abs(v25/v0)^0.05+abs(v26/v0)^0.05+abs(v27/v0)^0.05+abs(v28/v0)^0.05+abs(v29/v0)^0.05+abs(v30/v0)^0.05+abs(v31/v0)^0.05+abs(v32/v0)^0.05+abs(v33/v0)^0.05+abs(v34/v0)^0.05+abs(v35/v0)^0.05+abs(v36/v0)^0.05+abs(v37/v0)^0.05+abs(v38/v0)^0.05+abs(v39/v0)^0.05+abs(v40/v0)^0.05+abs(v41/v0)^0.05+abs(v42/v0)^0.05+abs(v43/v0)^0.05+abs(v44/v0)^0.05+abs(v45/v0)^0.05+abs(v46/v0)^0.05+abs(v47/v0)^0.05+abs(v48/v0)^0.05))

Couplings
  aveop1: Average on domains 1

Geometry
  geom1 "Geometry 1" (3D, length unit m)
    blk1: Block | size = {3e-6, 3e-6, 3e-6}
    fin: Finalize "Form Union"

Physics
  w: WeakFormPDE "Force Balance" on all domains
    dependent variable u = {u1, u2, u3}
    ShapeProperty.order = 2
    Units.DependentVariableQuantity = displacement
    wfeq1: WeakFormPDE (default)
      weak = {+P11*test(u1x)+P12*test(u1y)+P13*test(u1z), +P21*test(u2x)+P22*test(u2y)+P23*test(u2z), +P31*test(u3x)+P32*test(u3y)+P33*test(u3z)}
    zflx1: ZeroFluxBoundary "Zero Flux 1" (default)
    init1: init "Initial Values 1" (default)
    dir1: DirichletBoundary "Dirichlet Boundary Condition 1" on boundaries 6
      r = {3e-4[m/s]*t, 0, 0}
      useDirichletCondition = {1, 0, 0}
    dir2: DirichletBoundary "Dirichlet Boundary Condition 2" on boundaries 1
      r = {0, 0, 0}
      useDirichletCondition = {1, 0, 0}
    constr1: PointwiseConstraint on points 1 | constraintExpression = u2; constraintMethod = nodal
    constr2: PointwiseConstraint on points 1 | constraintExpression = u3; constraintMethod = nodal
    constr3: PointwiseConstraint on points 3 | constraintExpression = u3; constraintMethod = nodal
  dode: DomainODE "Flow rule" on all domains
    dependent variable dotFp = {q1, q2, q3, Up11, Up22, Up33, Up12, Up13, Up23}
    ShapeProperty.shapeFunctionType = shlag
    ShapeProperty.order = 1
    Units.SourceTermQuantity = frequencyfactor
    dode1: DistributedODE (default)
      f = {LpFp11, LpFp12, LpFp13, LpFp21, LpFp22, LpFp23, LpFp31, LpFp32, LpFp33}
      da = {da11, da21, da31, da41, da51, da61, da71, da81, da91, da12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}
    init1: init "Initial Values 1" (default)
      q1 = qi1(x,y,z)
      q2 = qi2(x,y,z)
      q3 = qi3(x,y,z)
      Up11 = 1
      Up22 = 1
      Up33 = 1
      Up12 = 0
      Up13 = 0
      Up23 = 0
      q4 = qi4(x,y,z)
  dode2: DomainODE "dislocation density" on all domains
    dependent variable h
    ShapeProperty.shapeFunctionType = shlag
    ShapeProperty.order = 1
    Units.SourceTermQuantity = frequencyfactor
    dode1: DistributedODE (default) | f = doth; da = 1
    init1: init "Initial Values 1" (default) | h = 2e13/rho0

Mesh
  mesh1 "Mesh 1"
    size: MeshSizeDefault | hauto = 3
    ftet1: FreeTet "Free Tetrahedral 1" on remaining entities
      xscale = 1
      yscale = 1
      smoothcontrol = on
      smoothmaxiter = 4
      smoothmaxdepth = 4
      zscale = 1
      numlayer = max

Studies
  std1 "Study 1"
    time: Transient "Time Dependent" | tlist = range(0,1e-5,3e-4); physselection = w

Solver configurations
  sol1 "Solution 1" (study std1)
    v1: Variables "Dependent Variables 1"
    t1: Time "Time-Dependent Solver 1" | tlist = range(0,1e-5,3e-4)
      dDef: Direct | linsolver = mumps
      se1: Segregated | segstabacc = segaacc
        ss1: SegregatedStep
          segvar = {comp1_q1, comp1_q2, comp1_q3, comp1_Up11, comp1_Up22, comp1_Up33, comp1_Up12, comp1_Up13, comp1_Up23}
          linsolver = dDef
          subdtech = hnlin
        ss2: SegregatedStep | segvar = {comp1_h}; linsolver = dDef
        ss3: SegregatedStep | segvar = {comp1_u1, comp1_u2, comp1_u3}; linsolver = dDef
        ll1: LowerLimit | lowerlimit = comp1.h 0
      prob1: SolverProblem "Information 1"
        error1: SolverError "Error 1"